// COMSOL Multiphysics 5.6.0.280 model "annulus.mph"
// Outline of the model tree
// Unit system: none

Parameters
  N = 10
  r_inner = 0.5
  r_outer = r_inner+delta*N
  delta = 0.1  // a+cc thickness
  theta_0 = 0
  theta_f = N*2*pi
  hh = 0.01  // cc thickness
  E_a = 1
  E_cc = 1e4
  alpha = 0.1

Functions
  an5: Analytic "X_cc_inner" | funcname = X_cc_inner; expr = (r_inner- hh/2 + delta*s/(2*pi))*cos(s); args = s
  an6: Analytic "Y_cc_inner" | funcname = Y_cc_inner; expr = (r_inner - hh/2 + delta*s/(2*pi))*sin(s); args = s
  an7: Analytic "N_x_cc_inner" | funcname = N_x_cc_inner; expr = d(Y_cc_inner(s),s)/sqrt(d(X_cc_inner(s),s)^2 + d(Y_cc_inner(s),s)^2); args = s
  an8: Analytic "N_y_cc_inner" | funcname = N_y_cc_inner; expr = -d(X_cc_inner(s),s)/sqrt(d(X_cc_inner(s),s)^2 + d(Y_cc_inner(s),s)^2); args = s
  an9: Analytic "X_cc_outer" | funcname = X_cc_outer; expr = (r_inner + hh/2 + delta*s/(2*pi))*cos(s); args = s
  an10: Analytic "Y_cc_outer" | funcname = Y_cc_outer; expr = (r_inner + hh/2 + delta*s/(2*pi))*sin(s); args = s
  an11: Analytic "N_x_cc_outer" | funcname = N_x_cc_outer; expr = d(Y_cc_outer(s),s)/sqrt(d(X_cc_outer(s),s)^2 + d(Y_cc_outer(s),s)^2); args = s
  an12: Analytic "N_y_cc_outer" | funcname = N_y_cc_outer; expr = -d(X_cc_outer(s),s)/sqrt(d(X_cc_outer(s),s)^2 + d(Y_cc_outer(s),s)^2); args = s
  an13: Analytic "X_cc_mid" | funcname = X_cc_mid; expr = (r_inner + delta*s/(2*pi))*cos(s); args = s
  an14: Analytic "Y_cc_mid" | funcname = Y_cc_mid; expr = (r_inner + delta*s/(2*pi))*sin(s); args = s
  an15: Analytic "N_x_cc_mid" | funcname = N_x_cc_mid; expr = d(Y_cc_mid(s),s)/sqrt(d(X_cc_mid(s),s)^2 + d(Y_cc_mid(s),s)^2); args = s
  an16: Analytic "N_y_cc_mid" | funcname = N_y_cc_mid; expr = -d(X_cc_mid(s),s)/sqrt(d(X_cc_mid(s),s)^2 + d(Y_cc_mid(s),s)^2); args = s

Coordinate systems
  sys2: Cylindrical "Cylindrical System 2"

Geometry
  geom1 "Geometry 1" (2D, length unit m)
    c1: Circle | r = r_inner
    c2: Circle | r = r_outer
    dif1: Difference | input = c2; input2 = c1
    fin: Finalize "Form Union"

Materials
  mat5: Common "current collector" on no domains
    def "Basic"
      youngsmodulus = E_cc
      poissonsratio = 1/3
      density = 1
      thermalexpansioncoefficient = 0
  mat6: Common "active" on domains 1
    def "Basic"
      youngsmodulus = E_a
      poissonsratio = 1/3
      density = 1
      thermalexpansioncoefficient = alpha

Physics
  solid: SolidMechanics on all domains
    dependent variable u = {u, v, w}
    ShapeProperty.order_displacement = 2
    StructuralTransientBehavior.StructuralTransientBehavior = Quasistatic
    lemm1: LinearElasticModel "Linear Elastic Material 1" (default)
      IsotropicOption = Enu
      ForceLinearStrainRes = 1
      coordinateSystem = sys2
      te1: ThermalExpansion on all domains | minput_strainreferencetemperature = 0; minput_temperature = 1
    free1: Free (default)
    init1: init "Initial Values 1" (default) | coordinateSystem = sys2
    rms1: RigidMotionSuppression on all domains
    fix1: Fixed "Fixed Constraint 1" (disabled) on boundaries 3, 4, 6, 7

Mesh
  mesh1 "Mesh 1" (physics-controlled)

Studies
  std1 "Study 1"
    stat: Stationary | errestandadap = none; meshadaptmethod = modify

Solver configurations
  sol1 "Solution 1" (study std1)
    v1: Variables "Dependent Variables 1"
    s1: Stationary "Stationary Solver 1"
      dDef: Direct | linsolver = pardiso
      fc1: FullyCoupled | linsolver = dDef
  sol2 "Adaptive Mesh Refinement Solutions 1" (study std1)

Datasets
  dset1: Solution | solution = sol1
  dset2: Solution | solution = sol2
  pc1: ParCurve2D "mid"
    data = dset1
    parmin1 = theta_0
    parmax1 = theta_f
    exprx = (r_inner + delta*s/(2*pi))*cos(s)
    expry = (r_inner + delta*s/(2*pi))*sin(s)
    adaptive = off
  pc2: ParCurve2D "inner"
    data = dset1
    parmin1 = theta_0
    parmax1 = theta_f
    exprx = (r_inner - hh/2+1e-4 + delta*s/(2*pi))*cos(s)
    expry = (r_inner -hh/2 +1e-4 + delta*s/(2*pi))*sin(s)
    adaptive = off
  pc3: ParCurve2D "outer"
    data = dset1
    parmin1 = theta_0
    parmax1 = theta_f
    exprx = (r_inner + hh/2 - 1e-4 + delta*s/(2*pi))*cos(s)
    expry = (r_inner + hh/2 - 1e-4 + delta*s/(2*pi))*sin(s)
    adaptive = off
  pc4: ParCurve2D "mid-outer"
    data = dset1
    parmin1 = theta_0
    parmax1 = theta_f
    exprx = (r_inner + hh/4 + delta*s/(2*pi))*cos(s)
    expry = (r_inner + hh/4 + delta*s/(2*pi))*sin(s)
    adaptive = off
  pc5: ParCurve2D "inner-mid"
    data = dset1
    parmin1 = theta_0
    parmax1 = theta_f
    exprx = (r_inner - hh/4 + delta*s/(2*pi))*cos(s)
    expry = (r_inner -hh/4 + delta*s/(2*pi))*sin(s)
    adaptive = off

Plots
  pg1: PlotGroup2D "Radial stress" | data = dset1; title = Radial stress
    surf1: Surface | expr = solid.sl11; descr = Stress tensor, local coordinate system, 11 component
      def: Deform "Deformation" | expr = {0, 0}
  pg2: PlotGroup2D "Hoop stress" | data = dset1; title = Hoop stress
    surf1: Surface | expr = solid.sl22; descr = Stress tensor, local coordinate system, 22 component
      def: Deform "Deformation" | expr = {0, 0}
  pg12: PlotGroup2D "Shear stress" | data = dset1; title = Shear stress
    surf1: Surface | expr = solid.sl12; descr = Stress tensor, local coordinate system, 12 component
      def: Deform "Deformation" | expr = {0, 0}
  pg7: PlotGroup2D "Radial strain (elastic)" | data = dset1; title = Radial strain (elastic)
    surf2: Surface | expr = solid.eel11
      def: Deform "Deformation" | expr = {0, 0}
  pg6: PlotGroup2D "Radial strain (expansion)" | data = dset1; title = Radial strain (expansion)
    surf1: Surface | expr = solid.eth11; descr = Thermal strain tensor, local coordinate system, 11 component
      def: Deform "Deformation" | expr = {0, 0}
  pg8: PlotGroup2D "Radial strain (total)" | data = dset1; title = Radial strain (total)
    surf1: Surface | expr = solid.el11
      def: Deform "Deformation" | expr = {0, 0}
  pg9: PlotGroup2D "Azimuthal strain (elastic)" | data = dset1; title = Azimuthal strain (elastic)
    surf2: Surface | expr = solid.eel22
      def: Deform "Deformation" | expr = {0, 0}
  pg10: PlotGroup2D "Azimuthal strain (expansion)" | data = dset1; title = Azimuthal strain (expansion)
    surf1: Surface | expr = solid.eth22; descr = Thermal strain tensor, local coordinate system, 22 component
      def: Deform "Deformation" | expr = {0, 0}
  pg11: PlotGroup2D "Azimuthal strain (total)" | data = dset1; title = Azimuthal strain (total)
    surf1: Surface | expr = solid.el22; descr = Strain tensor, local coordinate system, 22 component
      def: Deform "Deformation" | expr = {0, 0}
  pg3: PlotGroup2D "Total displacement" | data = dset1; title = Total displacement
    surf1: Surface | expr = solid.disp; descr = Total displacement
      def: Deform "Deformation" | expr = {u, v}; descr = Displacement field
  pg4: PlotGroup2D "Radial displacement" | data = dset1; title = Radial displacement
    surf1: Surface | expr = u*cos(sys2.phi) + v*sin(sys2.phi)
      def: Deform "Deformation" | expr = {u, v}; descr = Displacement field
  pg5: PlotGroup2D "Azimuthal displacement" | data = dset1; title = Azimuthal displacement
    surf1: Surface | expr = v*cos(sys2.phi) - u*sin(sys2.phi)
      def: Deform "Deformation" | expr = {u, v}; descr = Displacement field