// COMSOL Multiphysics 5.5.0.292 model "test.mph"
// Outline of the model tree
// Unit system: none

Parameters
  r_inner = 0.5
  r_outer = 1

Coordinate systems
  sys1: Boundary "Boundary System 1"
  sys2: Cylindrical "Cylindrical System 2"

Geometry
  geom1 "Geometry 1" (2D, length unit m)
    c1: Circle | r = r_inner
    c2: Circle | r = r_outer
    dif1: Difference | input = c2; input2 = c1
    fin: Finalize "Form Union"

Materials
  mat5: Common "current collector" on no domains
    def "Basic"
      youngsmodulus = 1
      poissonsratio = 1/3
      density = 1
      thermalexpansioncoefficient = 0
    KG "Bulk modulus and shear modulus"
      K = 1
      G = 1
  mat6: Common "active" on domains 1
    def "Basic"
      youngsmodulus = 1
      poissonsratio = 1/3
      density = 1
      thermalexpansioncoefficient = 1
    KG "Bulk modulus and shear modulus"
      K = 1
      G = 1

Physics
  solid: SolidMechanics on all domains
    dependent variable u = {u, v, w}
    ShapeProperty.order_displacement = 2
    EquationForm.form = Stationary
    Type2D.Type2D = PlaneStrain
    StructuralTransientBehavior.StructuralTransientBehavior = Quasistatic
    lemm1: LinearElasticModel "Linear Elastic Material 1" (default)
      SolidModel = Isotropic
      MixedFormulation = none
      IsotropicOption = Enu
      G_mat = from_mat
      ForceLinearStrainRes = 1
      AdditiveStrainDecomposition = 1
      coordinateSystem = GlobalSystem
      te1: ThermalExpansion on all domains
        alpha_mat = from_mat
        minput_strainreferencetemperature = 0
        minput_temperature = 1
    free1: Free (default)
    init1: init "Initial Values 1" (default) | coordinateSystem = GlobalSystem

Mesh
  mesh1 "Mesh 1" (physics-controlled)
    size: MeshSizeDefault | hauto = 4

Studies
  std1 "Study 1"
    stat: Stationary

Solver configurations
  sol1 "Solution 1" (study std1)
    v1: Variables "Dependent Variables 1"
    s1: Stationary "Stationary Solver 1"
      dDef: Direct
      fc1: FullyCoupled | linsolver = dDef

Datasets
  dset1: Solution | solution = sol1

Plots
  pg1: PlotGroup2D "Radial stress" | data = dset1
    surf1: Surface | expr = solid.sr; descr = Stress tensor, r component
  pg2: PlotGroup2D "Hoop stress" | data = dset1
    surf1: Surface | expr = solid.sphi; descr = Stress tensor, phi component
  pg3: PlotGroup2D "Radial displacement" | data = dset1
    surf1: Surface | expr = sqrt(u^2+v^2)