// COMSOL Multiphysics 5.6.0.280 model "jelly_mech_updated.mph"
// Outline of the model tree
// Unit system: none

Parameters
  N = 10
  r_inner = 0.5
  r_outer = r_inner+delta*N
  delta = 0.1  // a+cc thickness
  theta_0 = 0
  theta_f = N*2*pi
  hh = 0.1*delta  // cc thickness
  E_a = 1
  E_cc = 1e4
  alpha = 0.15

Functions
  an5: Analytic "X_cc_inner" | funcname = X_cc_inner; expr = (r_inner- hh/2 + delta*s/(2*pi))*cos(s); args = s
  an6: Analytic "Y_cc_inner" | funcname = Y_cc_inner; expr = (r_inner - hh/2 + delta*s/(2*pi))*sin(s); args = s
  an7: Analytic "N_x_cc_inner" | funcname = N_x_cc_inner; expr = d(Y_cc_inner(s),s)/sqrt(d(X_cc_inner(s),s)^2 + d(Y_cc_inner(s),s)^2); args = s
  an8: Analytic "N_y_cc_inner" | funcname = N_y_cc_inner; expr = -d(X_cc_inner(s),s)/sqrt(d(X_cc_inner(s),s)^2 + d(Y_cc_inner(s),s)^2); args = s
  an9: Analytic "X_cc_outer" | funcname = X_cc_outer; expr = (r_inner + hh/2 + delta*s/(2*pi))*cos(s); args = s
  an10: Analytic "Y_cc_outer" | funcname = Y_cc_outer; expr = (r_inner + hh/2 + delta*s/(2*pi))*sin(s); args = s
  an11: Analytic "N_x_cc_outer" | funcname = N_x_cc_outer; expr = d(Y_cc_outer(s),s)/sqrt(d(X_cc_outer(s),s)^2 + d(Y_cc_outer(s),s)^2); args = s
  an12: Analytic "N_y_cc_outer" | funcname = N_y_cc_outer; expr = -d(X_cc_outer(s),s)/sqrt(d(X_cc_outer(s),s)^2 + d(Y_cc_outer(s),s)^2); args = s
  an13: Analytic "X_cc_mid" | funcname = X_cc_mid; expr = (r_inner + delta*s/(2*pi))*cos(s); args = s
  an14: Analytic "Y_cc_mid" | funcname = Y_cc_mid; expr = (r_inner + delta*s/(2*pi))*sin(s); args = s
  an15: Analytic "N_x_cc_mid" | funcname = N_x_cc_mid; expr = d(Y_cc_mid(s),s)/sqrt(d(X_cc_mid(s),s)^2 + d(Y_cc_mid(s),s)^2); args = s
  an16: Analytic "N_y_cc_mid" | funcname = N_y_cc_mid; expr = -d(X_cc_mid(s),s)/sqrt(d(X_cc_mid(s),s)^2 + d(Y_cc_mid(s),s)^2); args = s

Coordinate systems
  sys2: Cylindrical "Cylindrical System 2"

Geometry
  geom1 "Geometry 1" (2D, length unit m)
    pc3: ParametricCurve "c.c. inner" | parmin = theta_0; parmax = theta_f; coord = {X_cc_inner(s), Y_cc_inner(s)}
    pc4: ParametricCurve "c.c. outer" | parmin = theta_0; parmax = theta_f; coord = {X_cc_outer(s), Y_cc_outer(s)}
    ls1: LineSegment "inner1"
      specify1 = coord
      coord1 = {r_inner - hh/2, 0}
      specify2 = coord
      coord2 = {r_inner - hh/2+delta, 0}
    ls2: LineSegment "outer1"
      specify1 = coord
      vertex1 = pc3(1) points 1
      coord1 = {(r_inner + hh/2 + delta*theta_f/(2*pi))*cos(theta_f)-delta, 0}
      specify2 = coord
      coord2 = {(r_inner + hh/2 + delta*theta_f/(2*pi))*cos(theta_f), 0}
    csol1: ConvertToSolid | input = ls1, ls2, pc3, pc4; keep = on
    del1: Delete "Delete Entities 1" | input = csol1(1) domains 2
    pol1: Polygon | type = open; source = table; table = {{0, 1.6}, {0, -1.6}}
    pol2: Polygon | type = open; source = table; table = {{-1.8, 0}, {1.8, 5.18056212209e-14}}
    uni1: Union | input = del1, ls1, ls2, pc3, pc4, pol1, pol2
    del2: Delete "Delete Entities 2" | input = uni1(1) boundaries 1, 21, 22, 42-44, 64, 86
    fin: Finalize "Form Union"

Materials
  mat5: Common "current collector" on domains 1, 2, 5, 6, 9, 10, 13, 14, 17, 18, 21, 22, 25, 26, 29, 30, 33, 34, 37-39, 41, 43, 45, 47, 49, 51, 53, 55, 57, 58, 60, 62, 64, 66, 68, 70, 72, 74, 76
    def "Basic"
      youngsmodulus = E_cc
      poissonsratio = 1/3
      density = 1
      thermalexpansioncoefficient = 0
  mat6: Common "active" on domains 3, 4, 7, 8, 11, 12, 15, 16, 19, 20, 23, 24, 27, 28, 31, 32, 35, 36, 40, 42, 44, 46, 48, 50, 52, 54, 56, 59, 61, 63, 65, 67, 69, 71, 73, 75
    def "Basic"
      youngsmodulus = E_a
      poissonsratio = 1/3
      density = 1
      thermalexpansioncoefficient = alpha

Physics
  solid: SolidMechanics on all domains
    dependent variable u = {u, v, w}
    ShapeProperty.order_displacement = 2
    StructuralTransientBehavior.StructuralTransientBehavior = Quasistatic
    lemm1: LinearElasticModel "Linear Elastic Material 1" (default)
      IsotropicOption = Enu
      ForceLinearStrainRes = 1
      coordinateSystem = sys2
      te1: ThermalExpansion on all domains | minput_strainreferencetemperature = 0; minput_temperature = 1
    free1: Free (default)
    init1: init "Initial Values 1" (default) | coordinateSystem = sys2
  cc: CurvilinearCoordinates on all domains
    Settings.CreateBasis = 1
    css1: CoordinateSystemSettings | SecondVector = y
    diff1: DiffusionMethod on all domains
      wall1: WallDefault "Wall 1" (default)
      wall2: Wall "Interior Wall 2" on boundaries 83, 84, 87, 88, 91, 92, 95, 96, 99, 100, 103, 104, 107, 108, 111, 112, 115, 116, 121, 123, 125, 127, 129, 131, 133, 135, 137, 140, 142, 144, 146, 148, 150, 152, 154, 156
      inl1: Inlet on boundaries 77, 78
      out1: Outlet on boundaries 58, 59

Mesh
  mesh1 "Mesh 1"
    size: MeshSizeDefault | hmax = 0.0592; hauto = 2
    map1: Map "Mapped 1" on remaining entities

Studies
  std1 "Study 1 - Compute Coordinate System"
    stat: Stationary | solve for = {cc}; errestandadap = none; meshadaptmethod = modify

Solver configurations
  sol1 "Solution 1" (study std1)
    v1: Variables "Dependent Variables 1"
    s1: Stationary "Stationary Solver 1"
      dDef: Direct
      fc1: FullyCoupled | linsolver = dDef

Datasets
  dset1: Solution | solution = sol1

Plots
  pg1: PlotGroup2D "Vector Field (cc)" | data = dset1
    str1: Streamline | expr = {cc.vX, cc.vY}
  pg2: PlotGroup2D "Curvlinear Coordinate System" | data = dset1
    syss1: CoordSysSurface "Coordinate System Surface 1" | sys = cc_cs