// COMSOL Multiphysics 5.6.0.280 model "jelly_mechanics_NEW2.mph"
// Outline of the model tree
// Unit system: none

Parameters
  N = 10
  r_inner = 0.5
  r_outer = r_inner+delta*N
  delta = 0.1  // a+cc thickness
  theta_0 = 0
  theta_f = N*2*pi
  hh = .01  // cc thickness
  E_a = 1
  E_cc = 1e4
  alpha = 0.15

Functions
  an5: Analytic "X_cc_inner" | funcname = X_cc_inner; expr = (r_inner- hh/2 + delta*s/(2*pi))*cos(s); args = s
  an6: Analytic "Y_cc_inner" | funcname = Y_cc_inner; expr = (r_inner - hh/2 + delta*s/(2*pi))*sin(s); args = s
  an7: Analytic "N_x_cc_inner" | funcname = N_x_cc_inner; expr = d(Y_cc_inner(s),s)/sqrt(d(X_cc_inner(s),s)^2 + d(Y_cc_inner(s),s)^2); args = s
  an8: Analytic "N_y_cc_inner" | funcname = N_y_cc_inner; expr = -d(X_cc_inner(s),s)/sqrt(d(X_cc_inner(s),s)^2 + d(Y_cc_inner(s),s)^2); args = s
  an9: Analytic "X_cc_outer" | funcname = X_cc_outer; expr = (r_inner + hh/2 + delta*s/(2*pi))*cos(s); args = s
  an10: Analytic "Y_cc_outer" | funcname = Y_cc_outer; expr = (r_inner + hh/2 + delta*s/(2*pi))*sin(s); args = s
  an11: Analytic "N_x_cc_outer" | funcname = N_x_cc_outer; expr = d(Y_cc_outer(s),s)/sqrt(d(X_cc_outer(s),s)^2 + d(Y_cc_outer(s),s)^2); args = s
  an12: Analytic "N_y_cc_outer" | funcname = N_y_cc_outer; expr = -d(X_cc_outer(s),s)/sqrt(d(X_cc_outer(s),s)^2 + d(Y_cc_outer(s),s)^2); args = s
  an13: Analytic "X_cc_mid" | funcname = X_cc_mid; expr = (r_inner + delta*s/(2*pi))*cos(s); args = s
  an14: Analytic "Y_cc_mid" | funcname = Y_cc_mid; expr = (r_inner + delta*s/(2*pi))*sin(s); args = s
  an15: Analytic "N_x_cc_mid" | funcname = N_x_cc_mid; expr = d(Y_cc_mid(s),s)/sqrt(d(X_cc_mid(s),s)^2 + d(Y_cc_mid(s),s)^2); args = s
  an16: Analytic "N_y_cc_mid" | funcname = N_y_cc_mid; expr = -d(X_cc_mid(s),s)/sqrt(d(X_cc_mid(s),s)^2 + d(Y_cc_mid(s),s)^2); args = s

Coordinate systems
  sys2: Cylindrical "Cylindrical System 2"

Geometry
  geom1 "Geometry 1" (2D, length unit m)
    pc3: ParametricCurve "c.c. inner" | parmin = theta_0; parmax = theta_f; coord = {X_cc_inner(s), Y_cc_inner(s)}
    pc4: ParametricCurve "c.c. outer" | parmin = theta_0; parmax = theta_f; coord = {X_cc_outer(s), Y_cc_outer(s)}
    ls1: LineSegment "inner1"
      specify1 = coord
      coord1 = {r_inner - hh/2, 0}
      specify2 = coord
      coord2 = {r_inner - hh/2+delta, 0}
    ls2: LineSegment "outer1"
      specify1 = coord
      vertex1 = pc3(1) points 1
      coord1 = {(r_inner + hh/2 + delta*theta_f/(2*pi))*cos(theta_f)-delta, 0}
      specify2 = coord
      coord2 = {(r_inner + hh/2 + delta*theta_f/(2*pi))*cos(theta_f), 0}
    csol1: ConvertToSolid | input = ls1, ls2, pc3, pc4; keep = on
    del1: Delete "Delete Entities 1" | input = csol1(1) domains 2
    fin: Finalize "Form Union"

Materials
  mat5: Common "current collector" on domains 1
    def "Basic"
      youngsmodulus = E_cc
      poissonsratio = 1/3
      density = 1
      thermalexpansioncoefficient = 0
  mat6: Common "active" on domains 2
    def "Basic"
      youngsmodulus = E_a
      poissonsratio = 1/3
      density = 1
      thermalexpansioncoefficient = alpha

Physics
  solid: SolidMechanics on all domains
    dependent variable u = {u, v, w}
    ShapeProperty.order_displacement = 2
    StructuralTransientBehavior.StructuralTransientBehavior = Quasistatic
    lemm1: LinearElasticModel "Linear Elastic Material 1" (default)
      IsotropicOption = Enu
      ForceLinearStrainRes = 1
      coordinateSystem = sys2
      te1: ThermalExpansion on all domains | minput_strainreferencetemperature = 0; minput_temperature = 1
    free1: Free (default)
    init1: init "Initial Values 1" (default) | coordinateSystem = sys2

Mesh
  mesh1 "Mesh 1" (physics-controlled)
    size: MeshSizeDefault | hauto = 1

Studies
  std1 "Study 1"
    stat: Stationary | geometricNonlinearity = on; errestandadap = none; meshadaptmethod = modify