// COMSOL Multiphysics 5.5.0.292 model "sandwich_mech_2.mph"
// Outline of the model tree
// Unit system: none

Parameters
  N = 0.1
  Lx = 1/delta
  Ly = 1
  E_a = 1
  E_cc = 1e3
  alpha = 0.05
  delta = 0.05
  L_cc = 0.1
  stiffness = E_cc*L_cc
  rigidity = E_cc*L_cc^3

Geometry
  geom1 "Geometry 1" (2D, length unit m)
    r1: Rectangle | pos = {0, Ly/2}; base = center; size = {2*Lx, Ly}
    r2: Rectangle | pos = {0, Ly+L_cc/2}; base = center; size = {2*Lx, L_cc}
    fin: Finalize "Form Union"

Materials
  mat5: Common "current collector" on domains 2
    def "Basic"
      youngsmodulus = E_cc
      poissonsratio = 1/3
      density = 1
      thermalexpansioncoefficient = 0
  mat6: Common "active" on domains 1
    def "Basic"
      youngsmodulus = E_a
      poissonsratio = 1/3
      density = 1
      thermalexpansioncoefficient = alpha

Physics
  solid: SolidMechanics on all domains
    dependent variable u = {u, v, w}
    ShapeProperty.order_displacement = 2
    StructuralTransientBehavior.StructuralTransientBehavior = Quasistatic
    lemm1: LinearElasticModel "Linear Elastic Material 1" (default)
      SolidModel = Isotropic
      IsotropicOption = Enu
      ForceLinearStrainRes = 1
      coordinateSystem = GlobalSystem
      te1: ThermalExpansion on all domains | minput_strainreferencetemperature = 0; minput_temperature = 1
    free1: Free (default)
    init1: init "Initial Values 1" (default) | coordinateSystem = GlobalSystem
    bndl1: BoundaryLoad on boundaries 5 | LoadType = ForceArea; Ftot = {0, 0.0001, 0}; FperArea = {0, -N, 0}
    disp2: Displacement1 "Prescribed Displacement 2" on boundaries 2 | Direction = {0, 1, 0}

Mesh
  mesh1 "Mesh 1" (physics-controlled)
    size: MeshSizeDefault | hauto = 1

Studies
  std1 "Study 1"
    stat: Stationary | errestandadap = none; meshadaptmethod = modify

Solver configurations
  sol1 "Solution 1" (study std1)
    v1: Variables "Dependent Variables 1"
    s1: Stationary "Stationary Solver 1"
      dDef: Direct | linsolver = pardiso
      fc1: FullyCoupled | linsolver = dDef
  sol2 "Adaptive Mesh Refinement Solutions 1" (study std1)

Datasets
  dset1: Solution | solution = sol1
  dset2: Solution | solution = sol2
  cln1: CutLine2D | data = dset1; genpoints = {{0, -1.92593E-34}, {0, 0.12}}

Plots
  pg1: PlotGroup2D "sigma xx" | data = dset1; title = sigma xx
    surf1: Surface | expr = solid.sl11; descr = Stress tensor, local coordinate system, 11 component
      def: Deform "Deformation" | expr = {0, 0}
  pg2: PlotGroup2D "sigma yy" | data = dset1; title = sigma yy
    surf1: Surface | expr = solid.sl22; descr = Stress tensor, local coordinate system, 22 component
      def: Deform "Deformation" | expr = {0, 0}
  pg12: PlotGroup2D "sigma xy" | data = dset1; title = sigma xy
    surf1: Surface | expr = solid.sl12; descr = Stress tensor, local coordinate system, 12 component
      def: Deform "Deformation" | expr = {0, 0}
  pg6: PlotGroup2D "x strain (expansion)" | data = dset1; title = x strain (expansion)
    surf1: Surface | expr = solid.eth11; descr = Thermal strain tensor, local coordinate system, 11 component
      def: Deform "Deformation" | expr = {0, 0}
  pg8: PlotGroup2D "x strain (total)" | data = dset1; title = x strain (total)
    surf1: Surface | expr = solid.el11
      def: Deform "Deformation" | expr = {0, 0}
  pg7: PlotGroup2D "x strain (elastic)" | data = dset1; title = x strain (elastic)
    surf2: Surface | expr = solid.eel11
      def: Deform "Deformation" | expr = {0, 0}
  pg9: PlotGroup2D "y strain (elastic)" | data = dset1; title = y strain (elastic)
    surf2: Surface | expr = solid.eel22
      def: Deform "Deformation" | expr = {0, 0}
  pg10: PlotGroup2D "y strain (expansion)" | data = dset1; title = y strain (expansion)
    surf1: Surface | expr = solid.eth22; descr = Thermal strain tensor, local coordinate system, 22 component
      def: Deform "Deformation" | expr = {0, 0}
  pg11: PlotGroup2D "y strain (total)" | data = dset1; title = y strain (total)
    surf1: Surface | expr = solid.el22; descr = Strain tensor, local coordinate system, 22 component
      def: Deform "Deformation" | expr = {0, 0}
  pg3: PlotGroup2D "Total displacement" | data = dset1; title = Total displacement
    surf1: Surface | expr = sqrt(u^2+v^2)
      def: Deform "Deformation" | expr = {0, 0}
  pg4: PlotGroup2D "x displacement" on domains 2 | data = dset1; title = x displacement
    surf1: Surface | expr = u; descr = Displacement field, X component
      def: Deform "Deformation" | expr = {u, v}; descr = Displacement field
  pg5: PlotGroup2D "y displacement" on domains 2 | data = dset1; title = y displacement
    surf1: Surface | expr = v; descr = Displacement field, Y component
      def: Deform "Deformation" | expr = {u, v}; descr = Displacement field
  pg13: PlotGroup1D "1D Plot Group 13" | data = dset1
    lngr1: LineGraph | data = cln1; expr = v; descr = Displacement field, Y component
  pg14: PlotGroup1D "1D Plot Group 14" | data = dset1
    lngr1: LineGraph | data = cln1; expr = solid.sy; descr = Stress tensor, y component
  pg15: PlotGroup1D "1D Plot Group 15" | data = dset1
    lngr1: LineGraph | data = cln1; expr = solid.sx; descr = Stress tensor, x component
  pg16: PlotGroup1D "1D Plot Group 16" | data = dset1
    lngr1: LineGraph | data = cln1; expr = u; descr = Displacement field, X component
  pg17: PlotGroup1D "1D Plot Group 17" | data = dset1
    lngr1: LineGraph | data = cln1; expr = solid.sxy; descr = Stress tensor, xy component

Exports
  plot2: Plot | filename = /home/timms/Documents/jelly_roll/phi.csv