// COMSOL Multiphysics 6.0.0.312 model "generalised_plane_strain.mph"
// Outline of the model tree
// Unit system: none

Parameters
  alpha = 0.1
  delta = (r_outer-r_inner)/N  // a+cc thickness
  E_a = 2*mu_a*(1+nu_a)
  E_cc = 2*mu_cc*(1+nu_cc)
  Eh_cc = E_cc*hh
  Eh3_cc = E_cc*hh^3
  hh = 0.01*delta  // cc thickness
  N = 10
  nu_a = 1/3
  nu_cc = 1/3
  r_inner = 0.25
  r_outer = 1
  theta_0 = 0
  theta_f = N*2*pi
  mu_a = 1
  lambda_a = 2*mu_a*nu_a/(1-2*nu_a)
  mu_cc = 1e4
  lambda_cc = 2*mu_cc*nu_cc*(1-2*nu_cc)
  alpha_cc = 0.01

Functions
  an5: Analytic "X_cc_inner" | funcname = X_cc_inner; expr = (r_inner- hh/2 + delta*s/(2*pi))*cos(s); args = s
  an6: Analytic "Y_cc_inner" | funcname = Y_cc_inner; expr = (r_inner - hh/2 + delta*s/(2*pi))*sin(s); args = s
  an9: Analytic "X_cc_outer" | funcname = X_cc_outer; expr = (r_inner + hh/2 + delta*s/(2*pi))*cos(s); args = s
  an10: Analytic "Y_cc_outer" | funcname = Y_cc_outer; expr = (r_inner + hh/2 + delta*s/(2*pi))*sin(s); args = s

Coordinate systems
  sys2: Cylindrical "Cylindrical System 2"
  sys3: Cylindrical "Cylindrical System 3"

Common definitions
  vectr1: VectorTransform "u_local" on all domains
    name = u_local
    studyStep = std1/stat
    vector = {u, v, w}
    outputSystem = sys2

Geometry
  geom1 "Geometry 1" (2D, length unit m)
    pc3: ParametricCurve "c.c. inner" | parmin = theta_0; parmax = theta_f; coord = {X_cc_inner(s), Y_cc_inner(s)}
    pc4: ParametricCurve "c.c. outer" | parmin = theta_0; parmax = theta_f; coord = {X_cc_outer(s), Y_cc_outer(s)}
    ls1: LineSegment "inner1"
      specify1 = coord
      coord1 = {r_inner - hh/2, 0}
      specify2 = coord
      coord2 = {r_inner - hh/2+delta, 0}
    ls2: LineSegment "outer1"
      specify1 = coord
      vertex1 = pc3(1) points 1
      coord1 = {(r_inner + hh/2 + delta*theta_f/(2*pi))*cos(theta_f)-delta, 0}
      specify2 = coord
      coord2 = {(r_inner + hh/2 + delta*theta_f/(2*pi))*cos(theta_f), 0}
    csol1: ConvertToSolid | input = ls1, ls2, pc3, pc4; keep = on
    del1: Delete "Delete Entities 1" | input = csol1(1) domains 2
    pol1: Polygon | source = table; table = {{0, r_outer*1.1}, {0, -r_outer*1.1}}
    pol2: Polygon | source = table; table = {{r_outer*1.1, 0}, {-r_outer*1.1, 0}}
    uni1: Union | input = del1, pol1, pol2
    del2: Delete "Delete Entities 2" | input = uni1(1) boundaries 1, 21, 22, 42-44, 64, 87
    fin: Finalize "Form Union"

Materials
  mat5: Common "current collector" on domains 1, 2, 5, 6, 9, 10, 13, 14, 17, 18, 21, 22, 25, 26, 29, 30, 33, 34, 37-39, 41, 43, 45, 47, 49, 51, 53, 55, 57, 58, 60, 62, 64, 66, 68, 70, 72, 74, 76
    def "Basic"
      youngsmodulus = E_cc
      poissonsratio = nu_cc
      density = 1
      thermalexpansioncoefficient = alpha_cc
  mat6: Common "active" on domains 3, 4, 7, 8, 11, 12, 15, 16, 19, 20, 23, 24, 27, 28, 31, 32, 35, 36, 40, 42, 44, 46, 48, 50, 52, 54, 56, 59, 61, 63, 65, 67, 69, 71, 73, 75
    def "Basic"
      youngsmodulus = E_a
      poissonsratio = nu_a
      density = 1
      thermalexpansioncoefficient = alpha

Physics
  solid: SolidMechanics on all domains
    dependent variable u = {u, v, w}
    ShapeProperty.order_displacement = 2
    Type2D.Type2D = GeneralizedPlaneStrain
    Type2D.enable_bending = 0
    StructuralTransientBehavior.StructuralTransientBehavior = Quasistatic
    lemm1: LinearElasticModel "Linear Elastic Material 1" (default)
      MixedFormulation = none
      IsotropicOption = Enu
      ForceLinearStrainRes = 1
      coordinateSystem = sys2
      te1: ThermalExpansion on all domains | minput_strainreferencetemperature = 0; minput_temperature = 1
    free1: Free (default)
    init1: init "Initial Values 1" (default) | coordinateSystem = sys2
    rms1: RigidMotionSuppression (disabled) on all domains
    fix1: Fixed "Fixed Constraint 1" (disabled) on boundaries 77-80, 119, 158
    disp1: Displacement1 "Prescribed Displacement 1" on boundaries 85, 86, 122, 155
      Notation = StandardNotation
      Direction = {1, 1, 0}
      U0 = {alpha_cc*sys3.r, 0, 0}
      coordinateSystem = sys3

Mesh
  mesh1 "Mesh 1"
    size: MeshSizeDefault | hmax = 0.01; hauto = 1; custom = on; hnarrow = 1
    map1: Map "Mapped 1" on remaining entities | adjustedgdistr = on

Studies
  std1 "Study 1"
    stat: Stationary | errestandadap = none; meshadaptmethod = modify

Solver configurations
  sol1 "Solution 1" (study std1)
    v1: Variables "Dependent Variables 1"
    s1: Stationary "Stationary Solver 1" | stol = 1e-3
      dDef: Direct | linsolver = pardiso
      fc1: FullyCoupled | linsolver = dDef

Datasets
  dset1: Solution | solution = sol1
  pc1: ParCurve2D "mid"
    data = dset1
    parmin1 = theta_0
    parmax1 = theta_f
    exprx = (r_inner + delta*s/(2*pi))*cos(s)
    expry = (r_inner + delta*s/(2*pi))*sin(s)
    res1 = 2000
  pc2: ParCurve2D "inner"
    data = dset1
    parmin1 = theta_0
    parmax1 = theta_f
    exprx = (r_inner - hh/2 + delta*s/(2*pi))*cos(s)
    expry = (r_inner -hh/2 + delta*s/(2*pi))*sin(s)
    res1 = 2000
  pc3: ParCurve2D "outer"
    data = dset1
    parmin1 = theta_0
    parmax1 = theta_f
    exprx = (r_inner + hh/2 + delta*s/(2*pi))*cos(s)
    expry = (r_inner + hh/2 + delta*s/(2*pi))*sin(s)
    res1 = 2000
  pc4: ParCurve2D "mid-outer"
    data = dset1
    parmin1 = theta_0
    parmax1 = theta_f
    exprx = (r_inner + hh/4 + delta*s/(2*pi))*cos(s)
    expry = (r_inner + hh/4 + delta*s/(2*pi))*sin(s)
  pc5: ParCurve2D "inner-mid"
    data = dset1
    parmin1 = theta_0
    parmax1 = theta_f
    exprx = (r_inner - hh/4 + delta*s/(2*pi))*cos(s)
    expry = (r_inner -hh/4 + delta*s/(2*pi))*sin(s)
  pc6: ParCurve2D "mid_a"
    data = dset1
    parmin1 = theta_0
    parmax1 = theta_f-2*pi
    exprx = (r_inner + delta/2 + delta*s/(2*pi))*cos(s)
    expry = (r_inner + delta/2 + delta*s/(2*pi))*sin(s)
  cln2: CutLine2D | data = dset1; genpoints = {{r_inner, 0}, {r_outer, 0}}
  cln1: CutLine2D "pi" | data = dset1; genpoints = {{-r_inner, 0}, {-r_outer, 0}}
  pc7: ParCurve2D "outer_a"
    data = dset1
    parmin1 = theta_0
    parmax1 = theta_f-2*pi
    exprx = (r_inner + delta-hh/2 + delta*s/(2*pi))*cos(s)
    expry = (r_inner + delta-hh/2 + delta*s/(2*pi))*sin(s)
  pc8: ParCurve2D "inner_a"
    data = dset1
    parmin1 = theta_0
    parmax1 = theta_f-2*pi
    exprx = (r_inner + hh/2 + delta*s/(2*pi))*cos(s)
    expry = (r_inner + hh/2 + delta*s/(2*pi))*sin(s)

Plots
  pg1: PlotGroup2D "Radial stress" | data = dset1; title = Radial stress
    surf1: Surface | expr = solid.sl11; descr = Stress tensor, local coordinate system, 11 component
      def: Deform "Deformation" | expr = {0, 0}
  pg13: PlotGroup2D "Radial stress cc" on domains 1, 2, 5, 6, 9, 10, 13, 14, 17, 18, 21, 22, 25, 26, 29, 30, 33, 34, 37-39, 41, 43, 45, 47, 49, 51, 53, 55, 57, 58, 60, 62, 64, 66, 68, 70, 72, 74, 76
    data = dset1
    title = Radial stress cc
    surf1: Surface | expr = solid.sl11; descr = Stress tensor, local coordinate system, 11 component
      def: Deform "Deformation" | expr = {0, 0}
  pg14: PlotGroup2D "Radial stress a" on domains 3, 4, 7, 8, 11, 12, 15, 16, 19, 20, 23, 24, 27, 28, 31, 32, 35, 36, 40, 42, 44, 46, 48, 50, 52, 54, 56, 59, 61, 63, 65, 67, 69, 71, 73, 75
    data = dset1
    title = Radial stress a
    surf1: Surface | expr = solid.sl11; descr = Stress tensor, local coordinate system, 11 component
      def: Deform "Deformation" | expr = {0, 0}
  pg2: PlotGroup2D "Hoop stress" | data = dset1; title = Hoop stress
    surf1: Surface | expr = solid.sl22; descr = Stress tensor, local coordinate system, 22 component
      def: Deform "Deformation" | expr = {0, 0}
  pg15: PlotGroup2D "Hoop stress cc" on domains 1, 2, 5, 6, 9, 10, 13, 14, 17, 18, 21, 22, 25, 26, 29, 30, 33, 34, 37-39, 41, 43, 45, 47, 49, 51, 53, 55, 57, 58, 60, 62, 64, 66, 68, 70, 72, 74, 76
    data = dset1
    title = Hoop stress cc
    surf1: Surface | expr = solid.sl22; descr = Stress tensor, local coordinate system, 22 component
      def: Deform "Deformation" | expr = {0, 0}
  pg16: PlotGroup2D "Hoop stress a" on domains 3, 4, 7, 8, 11, 12, 15, 16, 19, 20, 23, 24, 27, 28, 31, 32, 35, 36, 40, 42, 44, 46, 48, 50, 52, 54, 56, 59, 61, 63, 65, 67, 69, 71, 73, 75
    data = dset1
    title = Hoop stress a
    surf1: Surface | expr = solid.sl22; descr = Stress tensor, local coordinate system, 22 component
      def: Deform "Deformation" | expr = {0, 0}
  pg12: PlotGroup2D "Shear stress" | data = dset1; title = Shear stress
    surf1: Surface | expr = solid.sl12; descr = Stress tensor, local coordinate system, 12 component
      def: Deform "Deformation" | expr = {0, 0}
  pg17: PlotGroup2D "Shear stress cc" on domains 1, 2, 5, 6, 9, 10, 13, 14, 17, 18, 21, 22, 25, 26, 29, 30, 33, 34, 37-39, 41, 43, 45, 47, 49, 51, 53, 55, 57, 58, 60, 62, 64, 66, 68, 70, 72, 74, 76
    data = dset1
    title = Shear stress cc
    surf1: Surface | expr = solid.sl12; descr = Stress tensor, local coordinate system, 12 component
      def: Deform "Deformation" | expr = {0, 0}
  pg18: PlotGroup2D "Shear stress a" on domains 3, 4, 7, 8, 11, 12, 15, 16, 19, 20, 23, 24, 27, 28, 31, 32, 35, 36, 40, 42, 44, 46, 48, 50, 52, 54, 56, 59, 61, 63, 65, 67, 69, 71, 73, 75
    data = dset1
    title = Shear stress cc
    surf1: Surface | expr = solid.sl12; descr = Stress tensor, local coordinate system, 12 component
      def: Deform "Deformation" | expr = {0, 0}
  pg19: PlotGroup2D "Radial strain cc" on domains 1, 2, 5, 6, 9, 10, 13, 14, 17, 18, 21, 22, 25, 26, 29, 30, 33, 34, 37-39, 41, 43, 45, 47, 49, 51, 53, 55, 57, 58, 60, 62, 64, 66, 68, 70, 72, 74, 76
    data = dset1
    title = Radial strain cc
    surf1: Surface | expr = solid.el11
      def: Deform "Deformation" | expr = {0, 0}
  pg21: PlotGroup2D "Radial strain a" on domains 3, 4, 7, 8, 11, 12, 15, 16, 19, 20, 23, 24, 27, 28, 31, 32, 35, 36, 40, 42, 44, 46, 48, 50, 52, 54, 56, 59, 61, 63, 65, 67, 69, 71, 73, 75
    data = dset1
    title = Radial strain a
    surf1: Surface | expr = solid.el11
      def: Deform "Deformation" | expr = {0, 0}
  pg20: PlotGroup2D "Azimuthal strain cc" on domains 1, 2, 5, 6, 9, 10, 13, 14, 17, 18, 21, 22, 25, 26, 29, 30, 33, 34, 37-39, 41, 43, 45, 47, 49, 51, 53, 55, 57, 58, 60, 62, 64, 66, 68, 70, 72, 74, 76
    data = dset1
    title = Azimuthal strain cc
    surf1: Surface | expr = solid.el22; descr = Strain tensor, local coordinate system, 22 component
      def: Deform "Deformation" | expr = {0, 0}
  pg22: PlotGroup2D "Azimuthal strain a" on domains 3, 4, 7, 8, 11, 12, 15, 16, 19, 20, 23, 24, 27, 28, 31, 32, 35, 36, 40, 42, 44, 46, 48, 50, 52, 54, 56, 59, 61, 63, 65, 67, 69, 71, 73, 75
    data = dset1
    title = Azimuthal strain a
    surf1: Surface | expr = solid.el22; descr = Strain tensor, local coordinate system, 22 component
      def: Deform "Deformation" | expr = {0, 0}
  pg7: PlotGroup2D "Radial strain (elastic)" | data = dset1; title = Radial strain (elastic)
    surf2: Surface | expr = solid.eel11
      def: Deform "Deformation" | expr = {0, 0}
  pg6: PlotGroup2D "Radial strain (expansion)" | data = dset1; title = Radial strain (expansion)
    surf1: Surface | expr = solid.eth11; descr = Thermal strain tensor, local coordinate system, 11 component
      def: Deform "Deformation" | expr = {0, 0}
  pg8: PlotGroup2D "Radial strain (total)" | data = dset1; title = Radial strain (total)
    surf1: Surface | expr = solid.el11
      def: Deform "Deformation" | expr = {0, 0}
  pg9: PlotGroup2D "Azimuthal strain (elastic)" | data = dset1; title = Azimuthal strain (elastic)
    surf2: Surface | expr = solid.eel22
      def: Deform "Deformation" | expr = {0, 0}
  pg10: PlotGroup2D "Azimuthal strain (expansion)" | data = dset1; title = Azimuthal strain (expansion)
    surf1: Surface | expr = solid.eth22; descr = Thermal strain tensor, local coordinate system, 22 component
      def: Deform "Deformation" | expr = {0, 0}
  pg11: PlotGroup2D "Azimuthal strain (total)" | data = dset1; title = Azimuthal strain (total)
    surf1: Surface | expr = solid.el22; descr = Strain tensor, local coordinate system, 22 component
      def: Deform "Deformation" | expr = {0, 0}
  pg42: PlotGroup2D "Axial strain (total)" | data = dset1; title = Axial strain (total)
    surf1: Surface | expr = solid.el33; descr = Strain tensor, local coordinate system, 33 component
      def: Deform "Deformation" | expr = {0, 0}
  pg3: PlotGroup2D "Total displacement" on all domains | data = dset1; title = Total displacement
    surf1: Surface | expr = solid.disp; descr = Total displacement
      def: Deform "Deformation" | expr = {u, v}; descr = Displacement field
  pg4: PlotGroup2D "Radial displacement" | data = dset1; title = Radial displacement
    surf1: Surface | expr = u*cos(sys2.phi) + v*sin(sys2.phi)
      def: Deform "Deformation" | expr = {0, 0}
  pg5: PlotGroup2D "Azimuthal displacement" | data = dset1; title = Azimuthal displacement
    surf1: Surface | expr = v*cos(sys2.phi) - u*sin(sys2.phi)
      def: Deform "Deformation" | expr = {0, 0}
  pg23: PlotGroup1D "T" | data = none; xlabel = r; ylabel = T
    lngr1: LineGraph | data = pc2; expr = (solid.sl22 + solid.sl12*delta/pi/r_inner)*hh; xdata = expr; xdataexpr = sys2.r
    lngr2: LineGraph (disabled)
      data = pc5
      expr = (solid.sl22 + solid.sl12*delta/pi/r_inner)*hh
      xdata = expr
      xdataexpr = sys2.r
      legends = 2
    lngr3: LineGraph
      data = pc1
      expr = (solid.sl22 + solid.sl12*delta/pi/r_inner)*hh
      xdata = expr
      xdataexpr = sys2.r
      legends = 3
    lngr4: LineGraph (disabled)
      data = pc4
      expr = (solid.sl22 + solid.sl12*delta/pi/r_inner)*hh
      xdata = expr
      xdataexpr = sys2.r
      legends = 4
    lngr5: LineGraph
      data = pc3
      expr = (solid.sl22 + solid.sl12*delta/pi/r_inner)*hh
      xdata = expr
      xdataexpr = sys2.r
      legends = 5
  pg24: PlotGroup1D "u" | data = none; xlabel = r; ylabel = u
    lngr3: LineGraph
      data = pc6
      expr = u_local.vr
      descr = Transformed vector, r component
      xdata = expr
      xdataexpr = sys2.r
      legends = 3
    lngr4: LineGraph
      data = pc7
      expr = u_local.vr
      descr = Transformed vector, r component
      xdata = expr
      xdataexpr = sys2.r
      legends = 5
    lngr5: LineGraph
      data = pc8
      expr = u_local.vr
      descr = Transformed vector, r component
      xdata = expr
      xdataexpr = sys2.r
      legends = 1
    lngr6: LineGraph (disabled)
      data = pc6
      expr = u_local.vr
      descr = Transformed vector, r component
      xdata = expr
      xdataexpr = sys2.r
      legends = 3
  pg25: PlotGroup1D "v" | data = none; xlabel = r; ylabel = v
    lngr3: LineGraph
      data = pc6
      expr = u_local.vphi
      descr = Transformed vector, phi component
      xdata = expr
      xdataexpr = sys2.r
      legends = 3
    lngr6: LineGraph | data = pc8; expr = u_local.vphi; xdata = expr; xdataexpr = sys2.r
    lngr7: LineGraph
      data = pc7
      expr = u_local.vphi
      descr = Transformed vector, phi component
      xdata = expr
      xdataexpr = sys2.r
      legends = 3
  pg26: PlotGroup1D "e_rr" | data = none; xlabel = r; ylabel = e_rr
    lngr3: LineGraph
      data = pc6
      expr = solid.el11
      descr = Strain tensor, local coordinate system, 11 component
      xdata = expr
      xdataexpr = sys2.r
      legends = 3
  pg27: PlotGroup1D "e_tt" | data = none; xlabel = r; ylabel = e_tt
    lngr3: LineGraph
      data = pc6
      expr = solid.el22
      descr = Strain tensor, local coordinate system, 22 component
      xdata = expr
      xdataexpr = sys2.r
      legends = 3
  pg28: PlotGroup1D "e_rt" | data = none; xlabel = r; ylabel = e_rt
    lngr3: LineGraph
      data = pc6
      expr = solid.el12
      descr = Strain tensor, local coordinate system, 12 component
      xdata = expr
      xdataexpr = sys2.r
      legends = 3
  pg34: PlotGroup1D "u_0" | data = none; xlabel = r; ylabel = u
    lngr3: LineGraph
      data = cln2
      expr = u_local.vr
      descr = Transformed vector, r component
      xdata = expr
      xdataexpr = sys2.r
      legends = 3
  pg29: PlotGroup1D "u_pi" | data = none; xlabel = r; ylabel = u
    lngr3: LineGraph
      data = cln1
      expr = u_local.vr
      descr = Transformed vector, r component
      xdata = expr
      xdataexpr = sys2.r
      legends = 3
  pg35: PlotGroup1D "v_0" | data = none; xlabel = r; ylabel = v
    lngr3: LineGraph
      data = cln2
      expr = u_local.vphi
      descr = Transformed vector, phi component
      xdata = expr
      xdataexpr = sys2.r
      legends = 3
  pg30: PlotGroup1D "v_pi" | data = none; xlabel = r; ylabel = v
    lngr3: LineGraph
      data = cln1
      expr = u_local.vphi
      descr = Transformed vector, phi component
      xdata = expr
      xdataexpr = sys2.r
      legends = 3
  pg31: PlotGroup1D "s_rr" | data = none; xlabel = r; ylabel = s_rr
    lngr3: LineGraph
      data = pc6
      expr = solid.sl11
      descr = Stress tensor, local coordinate system, 11 component
      xdata = expr
      xdataexpr = sys2.r
      legends = 3
  pg32: PlotGroup1D "s_tt" | data = none; xlabel = r; ylabel = s_tt
    lngr3: LineGraph
      data = pc6
      expr = solid.sl22
      descr = Stress tensor, local coordinate system, 22 component
      xdata = expr
      xdataexpr = sys2.r
      legends = 3
  pg33: PlotGroup1D "s_rt" | data = none; xlabel = r; ylabel = s_rt
    lngr3: LineGraph
      data = pc6
      expr = solid.sl12
      descr = Stress tensor, local coordinate system, 12 component
      xdata = expr
      xdataexpr = sys2.r
      legends = 3
  pg36: PlotGroup1D "s_rr_0" | data = cln2; xlabel = r; ylabel = s_rr
    lngr3: LineGraph
      data = cln2
      expr = solid.sl11
      descr = Stress tensor, local coordinate system, 11 component
      xdata = expr
      xdataexpr = sys2.r
      legends = 3
  pg37: PlotGroup1D "s_rt_0" | data = cln2; xlabel = r; ylabel = s_rt
    lngr3: LineGraph
      data = cln2
      expr = solid.sl12
      descr = Stress tensor, local coordinate system, 12 component
      xdata = expr
      xdataexpr = sys2.r
      legends = 3
  pg38: PlotGroup1D "s_rr_pi" | data = cln1; xlabel = r; ylabel = s_rr
    lngr3: LineGraph
      data = cln1
      expr = solid.sl11
      descr = Stress tensor, local coordinate system, 11 component
      xdata = expr
      xdataexpr = sys2.r
      legends = 3
  pg39: PlotGroup1D "s_rt_pi" | data = cln1; xlabel = r; ylabel = s_rt
    lngr3: LineGraph
      data = cln1
      expr = solid.sl12
      descr = Stress tensor, local coordinate system, 12 component
      xdata = expr
      xdataexpr = sys2.r
      legends = 3
  pg40: PlotGroup1D "e_rr_pi" | data = cln1; xlabel = r; ylabel = e_rr
    lngr3: LineGraph
      data = cln1
      expr = solid.el11
      descr = Strain tensor, local coordinate system, 11 component
      xdata = expr
      xdataexpr = sys2.r
      legends = 3
  pg41: PlotGroup1D "e_rt_pi" | data = cln1; xlabel = r; ylabel = e_rt
    lngr3: LineGraph
      data = cln1
      expr = solid.el12
      descr = Strain tensor, local coordinate system, 12 component
      xdata = expr
      xdataexpr = sys2.r
      legends = 3

Exports
  plot3: Plot "T1" | filename = /home/timms/Documents/spiral-mechanics/data/T1.csv; separator = ,
  plot4: Plot "T2" | filename = /home/timms/Documents/spiral-mechanics/data/T2.csv; separator = ,
  plot5: Plot "T3" | filename = /home/timms/Documents/spiral-mechanics/data/T3.csv; separator = ,
  plot6: Plot "T4" | filename = /home/timms/Documents/spiral-mechanics/data/T4.csv; separator = ,
  plot7: Plot "T5" | filename = /home/timms/Documents/spiral-mechanics/data/T5.csv; separator = ,
  plot20: Plot "u1" | filename = /home/timms/Documents/spiral-mechanics/data/u1.csv
  plot8: Plot "u3" | filename = /home/timms/Documents/spiral-mechanics/data/u3.csv
  plot18: Plot "u5" | filename = /home/timms/Documents/spiral-mechanics/data/u5.csv
  plot21: Plot "v1" | filename = /home/timms/Documents/spiral-mechanics/data/v1.csv
  plot9: Plot "v3" | filename = /home/timms/Documents/spiral-mechanics/data/v3.csv
  plot19: Plot "v5" | filename = /home/timms/Documents/spiral-mechanics/data/v5.csv
  plot10: Plot "err3" | filename = /home/timms/Documents/spiral-mechanics/data/err3.csv
  plot11: Plot "ett3" | filename = /home/timms/Documents/spiral-mechanics/data/ett3.csv
  plot12: Plot "ert3" | filename = /home/timms/Documents/spiral-mechanics/data/ert3.csv
  plot15: Plot "srr3" | filename = /home/timms/Documents/spiral-mechanics/data/srr3.csv
  plot16: Plot "stt3" | filename = /home/timms/Documents/spiral-mechanics/data/stt3.csv
  plot17: Plot "srt3" | filename = /home/timms/Documents/spiral-mechanics/data/srt3.csv
  plot13: Plot "u_pi" | filename = /home/timms/Documents/spiral-mechanics/data/u_pi.csv
  plot14: Plot "v_pi" | filename = /home/timms/Documents/spiral-mechanics/data/v_pi.csv
  plot22: Plot "u_0" | filename = /home/timms/Documents/spiral-mechanics/data/u_0.csv
  plot23: Plot "v_0" | filename = /home/timms/Documents/spiral-mechanics/data/v_0.csv
  plot24: Plot "srr_0" | filename = /home/timms/Documents/spiral-mechanics/data/srr_0.csv
  plot25: Plot "srt_0" | filename = /home/timms/Documents/spiral-mechanics/data/srt_0.csv
  plot26: Plot "srr_pi" | filename = /home/timms/Documents/spiral-mechanics/data/srr_pi.csv
  plot27: Plot "srt_pi" | filename = /home/timms/Documents/spiral-mechanics/data/srt_pi.csv