// COMSOL Multiphysics 6.0.0.312 model "inner_problem.mph"
// Outline of the model tree
// Unit system: none

Parameters
  nu_a = 1/3
  E_a = 2*mu_a*(1+nu_a)
  L = 1.05*r0*pi/delta
  N = 5
  r0 = 0.25
  delta = (r1-r0)/Nw
  mu_a = 1
  lam_a = 2*mu_a*nu_a/(1-2*nu_a)
  r1 = 1
  Nw = 10
  Fn = 2*sqrt(mu_a/(lam_a+2*mu_a)) + (alpha_cc/alpha_a)*((lam_a*(lam_a-2*mu_a))/(3*lam_a+2*mu_a))*sqrt((lam_a + 2 * mu_a)/mu_a)
  alpha_cc = 0.5
  alpha_a = 1
  Ft = -1

Geometry
  geom1 "Geometry 1" (2D, length unit m)
    r1: Rectangle | size = {L, 1}
    r2: Rectangle | pos = {0, 1.5}; base = center; size = {2*L, 1}
    r3: Rectangle | pos = {0, 2.5}; base = center; size = {2*L, 1}
    r4: Rectangle | pos = {0, 3.5}; base = center; size = {2*L, 1}
    r5: Rectangle | pos = {0, 4.5}; base = center; size = {2*L, 1}
    fin: Finalize "Form Union"

Materials
  mat6: Common "nunu" on domains 1-5
    def "Basic"
      youngsmodulus = E_a
      poissonsratio = nu_a
      density = 1
      thermalexpansioncoefficient = 0

Physics
  solid: SolidMechanics on all domains
    dependent variable u = {u, v, w}
    ShapeProperty.order_displacement = 2
    StructuralTransientBehavior.StructuralTransientBehavior = Quasistatic
    lemm1: LinearElasticModel "Linear Elastic Material 1" (default)
      SolidModel = Isotropic
      IsotropicOption = Enu
      ForceLinearStrainRes = 1
      coordinateSystem = GlobalSystem
    free1: Free (default)
    init1: init "Initial Values 1" (default) | coordinateSystem = GlobalSystem
    bndl1: BoundaryLoad on boundaries 10 | LoadType = ForceArea; Ftot = {0, 0.0001, 0}; FperArea = {-Fn, -Ft, 0}
    fix1: Fixed "Fixed Constraint 1" on boundaries 1, 3, 5, 7, 9, 13-17
    disp3: Displacement1 "Prescribed Displacement 3" on boundaries 2, 4, 6, 8, 11, 12 | Direction = {1, 0, 0}

Mesh
  mesh1 "Mesh 1"
    size: MeshSizeDefault | hmax = 0.1; hauto = 1; custom = on
    map1: Map "Mapped 1" on remaining entities

Studies
  std1 "Study 1"
    stat: Stationary | errestandadap = none; meshadaptmethod = modify

Solver configurations
  sol1 "Solution 1" (study std1)
    v1: Variables "Dependent Variables 1"
    s1: Stationary "Stationary Solver 1"
      dDef: Direct | linsolver = pardiso
      fc1: FullyCoupled | linsolver = dDef
  sol2 "Adaptive Mesh Refinement Solutions 1" (study std1)

Datasets
  dset1: Solution | solution = sol1
  dset2: Solution | solution = sol2
  cln1: CutLine2D | data = dset1; genpoints = {{0, -1.92593E-34}, {0, 0.12}}

Plots
  pg1: PlotGroup2D "sigma xx" | data = dset1; title = sigma xx
    surf1: Surface | expr = solid.sl11; descr = Stress tensor, local coordinate system, 11 component
      def: Deform "Deformation" | expr = {0, 0}
  pg2: PlotGroup2D "sigma yy" | data = dset1; title = sigma yy
    surf1: Surface | expr = solid.sl22; descr = Stress tensor, local coordinate system, 22 component
      def: Deform "Deformation" | expr = {0, 0}
  pg12: PlotGroup2D "sigma xy" | data = dset1; title = sigma xy
    surf1: Surface | expr = solid.sl12; descr = Stress tensor, local coordinate system, 12 component
      def: Deform "Deformation" | expr = {0, 0}
  pg8: PlotGroup2D "x strain (total)" | data = dset1; title = x strain (total)
    surf1: Surface | expr = solid.el11
      def: Deform "Deformation" | expr = {0, 0}
  pg7: PlotGroup2D "x strain (elastic)" | data = dset1; title = x strain (elastic)
    surf2: Surface | expr = solid.eel11
      def: Deform "Deformation" | expr = {0, 0}
  pg9: PlotGroup2D "y strain (elastic)" | data = dset1; title = y strain (elastic)
    surf2: Surface | expr = solid.eel22
      def: Deform "Deformation" | expr = {0, 0}
  pg11: PlotGroup2D "y strain (total)" | data = dset1; title = y strain (total)
    surf1: Surface | expr = solid.el22; descr = Strain tensor, local coordinate system, 22 component
      def: Deform "Deformation" | expr = {0, 0}
  pg3: PlotGroup2D "Total displacement" | data = dset1; title = Total displacement
    surf1: Surface | expr = sqrt(u^2+v^2)
      def: Deform "Deformation" | expr = {u, v}; descr = Displacement field
  pg4: PlotGroup2D "x displacement" | data = dset1; title = Azimuthal displacement
    surf1: Surface | expr = u; descr = Displacement field, X component
      def: Deform "Deformation" | expr = {0, 0}
  pg5: PlotGroup2D "y displacement" on domains 1-3, 5 | data = dset1; title = Radial displacement
    surf1: Surface | expr = v; descr = Displacement field, Y component
      def: Deform "Deformation" | expr = {u, v}; descr = Displacement field

Exports
  plot3: Plot "v" | filename = /home/timms/Documents/jelly_roll_mechanics/data/boundary_layer/v.csv
  plot4: Plot "u" | filename = /home/timms/Documents/jelly_roll_mechanics/data/boundary_layer/u.csv
  data1: Data "u_grid"
    data = dset1
    expr = v
    descr = Displacement field, Y component
    filename = /home/timms/Documents/jelly_roll_mechanics/data/boundary_layer/u_grid.csv
    location = grid
    gridx2 = range(-L,(L-(-L))/100,L)
    gridy2 = range(0,(N-0)/100,N)
    regulargridx2 = 100
    regulargridy2 = 100
  data2: Data "v_grid"
    data = dset1
    expr = u
    descr = Displacement field, X component
    filename = /home/timms/Documents/jelly_roll_mechanics/data/boundary_layer/v_grid.csv
    location = grid
    gridx2 = range(-L,(L-(-L))/100,L)
    gridy2 = range(0,(N-0)/100,N)
    regulargridx2 = 100
    regulargridy2 = 100
  data5: Data "err_grid"
    data = dset1
    expr = solid.el22
    descr = Strain tensor, local coordinate system, 22 component
    filename = /home/timms/Documents/jelly_roll_mechanics/data/boundary_layer/err_grid.csv
    location = grid
    gridx2 = range(-L,(L-(-L))/100,L)
    gridy2 = range(0,(N-0)/100,N)
    regulargridx2 = 100
    regulargridy2 = 100
  data4: Data "ert_grid"
    data = dset1
    expr = solid.el12
    descr = Strain tensor, local coordinate system, 12 component
    filename = /home/timms/Documents/jelly_roll_mechanics/data/boundary_layer/ert_grid.csv
    location = grid
    gridx2 = range(-L,(L-(-L))/100,L)
    gridy2 = range(0,(N-0)/100,N)
    regulargridx2 = 100
    regulargridy2 = 100
  data3: Data "ett_grid"
    data = dset1
    expr = solid.el11
    descr = Strain tensor, local coordinate system, 11 component
    filename = /home/timms/Documents/jelly_roll_mechanics/data/boundary_layer/ett_grid.csv
    location = grid
    gridx2 = range(-L,(L-(-L))/100,L)
    gridy2 = range(0,(N-0)/100,N)
    regulargridx2 = 100
    regulargridy2 = 100
  data6: Data "srr_grid"
    data = dset1
    expr = solid.sl22
    descr = Stress tensor, local coordinate system, 22 component
    filename = /home/timms/Documents/jelly_roll_mechanics/data/boundary_layer/srr_grid.csv
    location = grid
    gridx2 = range(-L,(L-(-L))/100,L)
    gridy2 = range(0,(N-0)/100,N)
    regulargridx2 = 100
    regulargridy2 = 100
  data7: Data "srt_grid"
    data = dset1
    expr = solid.sl12
    descr = Stress tensor, local coordinate system, 12 component
    filename = /home/timms/Documents/jelly_roll_mechanics/data/boundary_layer/srt_grid.csv
    location = grid
    gridx2 = range(-L,(L-(-L))/100,L)
    gridy2 = range(0,(N-0)/100,N)
    regulargridx2 = 100
    regulargridy2 = 100
  data8: Data "stt_grid"
    data = dset1
    expr = solid.sl11
    descr = Stress tensor, local coordinate system, 11 component
    filename = /home/timms/Documents/jelly_roll_mechanics/data/boundary_layer/stt_grid.csv
    location = grid
    gridx2 = range(-L,(L-(-L))/100,L)
    gridy2 = range(0,(N-0)/100,N)
    regulargridx2 = 100
    regulargridy2 = 100