// COMSOL Multiphysics 6.0.0.312 model "jelly_2D_generalised_N5.mph"
// Outline of the model tree
// Unit system: none

Parameters
  alpha_cc = 0.000
  alpha_ccn = alpha_cc*(1-delta)
  alpha_ccp = alpha_cc*(1+delta)
  alpha_n = 0.1
  alpha_p = -0.02
  alpha_s = 0
  delta = 2*l_sum_dim/L_dim  // double sandwich thickness
  E_ccn = 2*mu_ccn*(1+nu_ccn)
  E_ccp = 2*mu_ccp*(1+nu_ccp)
  E_n = 2*mu_n*(1+nu_n)
  E_n_dim = 2.5*1e9
  E_p = 2*mu_p*(1+nu_p)
  E_p_dim = 2*1e9
  E_s = 2*mu_s*(1+nu_s)
  E_s_dim = 0.4*1e9
  H = 3
  h_ccn = 0.005*delta
  h_ccp = 0.005*delta
  h_n = l_n*delta - h_ccn/2
  h_p = l_p*delta - h_ccp/2
  h_s = l_s*delta
  h_total = h_ccn+2*h_n+2*h_s++2*h_p+h_ccp  // should equal delta
  l = 2*(l_p+l_s+l_n)  // should equal 1
  L_dim = 9e-3
  l_n = l_n_dim/l_sum_dim/2
  l_n_dim = 4*66*1e-6
  l_p = l_p_dim/l_sum_dim/2
  l_p_dim = 4*69*1e-6
  l_s = l_s_dim/l_sum_dim/2
  l_s_dim = 4*20*1e-6
  l_sum_dim = l_n_dim+l_s_dim+l_p_dim
  lam_n = 2 * mu_n * nu_n / (1 - 2 * nu_n)
  lam_p = 2 * mu_p * nu_p / (1 - 2 * nu_p)
  lam_s = 2 * mu_s * nu_s / (1 - 2 * nu_s)
  mu_ccn = mu_n*1e4
  mu_ccp = mu_p*1e4
  mu_n = mu_n_dim/mu_ref
  mu_n_dim = E_n_dim / 2 / (1 + nu_n)
  mu_p = mu_p_dim/mu_ref
  mu_p_dim = E_p_dim / 2 / (1 + nu_p)
  mu_ref = (l_sum_dim) / (l_n_dim / mu_n_dim + l_s_dim / mu_s_dim + l_p_dim / mu_p_dim)
  mu_s = mu_s_dim/mu_ref
  mu_s_dim = E_s_dim / 2 / (1 + nu_s)
  N = 5
  nu_ccn = 1/3
  nu_ccp = 1/3
  nu_n = 0.3
  nu_p = 0.3
  nu_s = 0.01
  r_inner = 1 - N*delta
  r_outer = 1
  theta_0 = 0
  theta_f = N*2*pi

Functions
  an5: Analytic "X_ccp_inner" | funcname = X_ccp_inner; expr = (r_inner - h_ccp/2 + delta*s/(2*pi))*cos(s); args = s
  an6: Analytic "Y_ccp_inner" | funcname = Y_ccp_inner; expr = (r_inner - h_ccp/2 + delta*s/(2*pi))*sin(s); args = s
  an9: Analytic "X_ccp_outer" | funcname = X_ccp_outer; expr = (r_inner + h_ccp/2 + delta*s/(2*pi))*cos(s); args = s
  an10: Analytic "Y_ccp_outer" | funcname = Y_ccp_outer; expr = (r_inner + h_ccp/2 + delta*s/(2*pi))*sin(s); args = s
  an17: Analytic "X_sep_pn_inner" | funcname = X_sep_pn_inner; expr = (r_inner + h_ccp/2 + h_p + delta*s/(2*pi))*cos(s); args = s
  an18: Analytic "Y_sep_pn_inner" | funcname = Y_sep_pn_inner; expr = (r_inner + h_ccp/2 + h_p + delta*s/(2*pi))*sin(s); args = s
  an19: Analytic "X_sep_pn_outer" | funcname = X_sep_pn_outer; expr = (r_inner + h_ccp/2 + h_p + h_s + delta*s/(2*pi))*cos(s); args = s
  an20: Analytic "Y_sep_pn_outer" | funcname = Y_sep_pn_outer; expr = (r_inner + h_ccp/2 + h_p + h_s + delta*s/(2*pi))*sin(s); args = s
  an11: Analytic "X_ccn_inner" | funcname = X_ccn_inner; expr = (r_inner + delta/2 - h_ccn/2 + delta*s/(2*pi))*cos(s); args = s
  an12: Analytic "Y_ccn_inner" | funcname = Y_ccn_inner; expr = (r_inner + delta/2 - h_ccn/2 + delta*s/(2*pi))*sin(s); args = s
  an13: Analytic "X_ccn_outer" | funcname = X_ccn_outer; expr = (r_inner + delta/2 + h_ccn/2 + delta*s/(2*pi))*cos(s); args = s
  an14: Analytic "Y_ccn_outer" | funcname = Y_ccn_outer; expr = (r_inner + delta/2 + h_ccn/2 + delta*s/(2*pi))*sin(s); args = s
  an15: Analytic "X_sep_np_inner" | funcname = X_sep_np_inner; expr = (r_inner + delta - h_ccp/2 - h_p - h_s + delta*s/(2*pi))*cos(s); args = s
  an16: Analytic "Y_sep_np_inner" | funcname = Y_sep_np_inner; expr = (r_inner + delta - h_ccp/2 - h_p - h_s + delta*s/(2*pi))*sin(s); args = s
  an21: Analytic "X_sep_np_outer" | funcname = X_sep_np_outer; expr = (r_inner + delta - h_ccp/2 - h_p + delta*s/(2*pi))*cos(s); args = s
  an22: Analytic "Y_sep_np_outer" | funcname = Y_sep_np_outer; expr = (r_inner + delta - h_ccp/2 - h_p + delta*s/(2*pi))*sin(s); args = s

Selections
  sel3: Explicit "ccp" on domains 1, 2, 17-19, 33-35, 49-51, 65-67, 75, 83, 91, 99, 100, 108, 116, 124, 132
  sel4: Explicit "p" on domains 3, 4, 15, 16, 19, 20, 31, 32, 35, 36, 47, 48, 51, 52, 63, 64, 68, 74, 76, 82, 84, 90, 92, 98, 101, 107, 109, 115, 117, 123, 125, 131
  sel5: Explicit "sep pn" on domains 13, 14, 29, 30, 45, 46, 61, 62, 73, 81, 89, 97, 102, 110, 118, 126
  sel2: Explicit "n" on domains 7, 8, 11, 12, 23, 24, 27, 28, 39, 40, 43, 44, 55, 56, 59, 60, 70, 72, 78, 80, 86, 88, 94, 96, 103, 105, 111, 113, 119, 121, 127, 129
  sel1: Explicit "ccn" on domains 9, 10, 25, 26, 41, 42, 57, 58, 71, 79, 87, 95, 104, 112, 120, 128
  sel6: Explicit "sep np" on domains 5, 6, 21, 22, 37, 38, 53, 54, 69, 77, 85, 93, 106, 114, 122, 130
  uni1: Union "cc" | entitydim = 2; input = {sel3, sel1}
  uni2: Union "a" | entitydim = 2; input = {sel2, sel4}
  uni3: Union "sep" | entitydim = 2; input = {sel5, sel6}

Coordinate systems
  sys2: Cylindrical "Cylindrical System 2"

Geometry
  geom1 "Geometry 1" (2D, length unit m)
    pc5: ParametricCurve "ccp inner" | parmin = theta_0; parmax = theta_f; coord = {X_ccp_inner(s), Y_ccp_inner(s)}
    pc6: ParametricCurve "ccp outer" | parmin = theta_0; parmax = theta_f; coord = {X_ccp_outer(s), Y_ccp_outer(s)}
    pc8: ParametricCurve "sep pn inner"
      parmin = theta_0
      parmax = theta_f-2*pi
      coord = {X_sep_pn_inner(s), Y_sep_pn_inner(s)}
    pc9: ParametricCurve "sep pn outer"
      parmin = theta_0
      parmax = theta_f-2*pi
      coord = {X_sep_pn_outer(s), Y_sep_pn_outer(s)}
    pc3: ParametricCurve "ccn inner" | parmin = theta_0; parmax = theta_f-2*pi; coord = {X_ccn_inner(s), Y_ccn_inner(s)}
    pc4: ParametricCurve "ccn outer" | parmin = theta_0; parmax = theta_f-2*pi; coord = {X_ccn_outer(s), Y_ccn_outer(s)}
    pc7: ParametricCurve "sep np inner"
      parmin = theta_0
      parmax = theta_f-2*pi
      coord = {X_sep_np_inner(s), Y_sep_np_inner(s)}
    pc10: ParametricCurve "sep np outer"
      parmin = theta_0
      parmax = theta_f-2*pi
      coord = {X_sep_np_outer(s), Y_sep_np_outer(s)}
    ls1: LineSegment "inner1"
      specify1 = coord
      coord1 = {X_ccp_inner(0), 0}
      specify2 = coord
      coord2 = {X_ccp_inner(2*pi), 0}
    ls2: LineSegment "outer1"
      specify1 = coord
      vertex1 = pc3(1) points 1
      coord1 = {X_ccp_outer(theta_f-2*pi), 0}
      specify2 = coord
      coord2 = {X_ccp_outer(theta_f), 0}
    csol1: ConvertToSolid | input = ls1, ls2, pc10, pc3, pc4, pc5, pc6, pc7, pc8, pc9; keep = on
    del1: Delete "Delete Entities 1" | input = csol1(1) domains 2
    pol1: Polygon | source = table; table = {{0, r_outer*1.1}, {0, -r_outer*1.1}}
    pol2: Polygon | source = table; table = {{r_outer*1.1, 0}, {-r_outer*1.1, 0}}
    uni1: Union | input = del1, pol1, pol2
    del2: Delete "Delete Entities 2" | input = uni1(1) boundaries 1, 35, 36, 70-72, 106, 148
    fin: Finalize "Form Union"

Materials
  mat7: Common "ccp" on selection sel3
    def "Basic"
      youngsmodulus = E_ccp
      poissonsratio = nu_ccp
      density = 1
      thermalexpansioncoefficient = alpha_ccp
  mat8: Common "p" on selection sel4
    def "Basic"
      youngsmodulus = E_p
      poissonsratio = nu_p
      density = 1
      thermalexpansioncoefficient = alpha_p
  mat9: Common "s" on selection uni3
    def "Basic"
      youngsmodulus = E_s
      poissonsratio = nu_s
      density = 1
      thermalexpansioncoefficient = alpha_s
  mat6: Common "n" on selection sel2
    def "Basic"
      youngsmodulus = E_n
      poissonsratio = nu_n
      density = 1
      thermalexpansioncoefficient = alpha_n
  mat5: Common "ccn" on selection sel1
    def "Basic"
      youngsmodulus = E_ccn
      poissonsratio = nu_ccn
      density = 1
      thermalexpansioncoefficient = alpha_ccn

Physics
  solid: SolidMechanics on all domains
    dependent variable u = {u, v, w}
    ShapeProperty.order_displacement = 2
    Type2D.Type2D = GeneralizedPlaneStrain
    Type2D.enable_bending = 0
    StructuralTransientBehavior.StructuralTransientBehavior = Quasistatic
    lemm1: LinearElasticModel "Linear Elastic Material 1" (default)
      MixedFormulation = eFormulation
      IsotropicOption = Enu
      ForceLinearStrainRes = 1
      coordinateSystem = sys2
      te1: ThermalExpansion on all domains | minput_strainreferencetemperature = 0; minput_temperature = 1
    free1: Free (default)
    init1: init "Initial Values 1" (default) | coordinateSystem = sys2
    rms1: RigidMotionSuppression on all domains
    fix1: Fixed "Fixed Constraint 1" (disabled) on boundaries 133-142, 209, 276

Mesh
  mesh1 "Mesh 1"
    size: MeshSizeDefault | hmax = 0.01; hcurve = 0.2; hauto = 1; custom = on; hnarrow = 1
    map1: Map "Mapped 1" on remaining entities | adjustedgdistr = on

Studies
  std1 "Study 1"
    stat: Stationary | errestandadap = none; meshadaptmethod = modify

Solver configurations
  sol1 "Solution 1" (study std1)
    v1: Variables "Dependent Variables 1"
    s1: Stationary "Stationary Solver 1"
      dDef: Direct | linsolver = pardiso
      fc1: FullyCoupled | linsolver = dDef
  sol2 "Adaptive Mesh Refinement Solutions 1" (study std1)

Datasets
  dset1: Solution | solution = sol1
  dset2: Solution | solution = sol2
  pc1: ParCurve2D "mid cp"
    data = dset1
    parmin1 = theta_0
    parmax1 = theta_f
    exprx = (r_inner + delta*s/(2*pi))*cos(s)
    expry = (r_inner + delta*s/(2*pi))*sin(s)
  pc2: ParCurve2D "inner cp"
    data = dset1
    parmin1 = theta_0
    parmax1 = theta_f
    exprx = (r_inner - h_ccp/2 + delta*s/(2*pi))*cos(s)
    expry = (r_inner - h_ccp/2 + delta*s/(2*pi))*sin(s)
  pc3: ParCurve2D "outer cp"
    data = dset1
    parmin1 = theta_0
    parmax1 = theta_f
    exprx = (r_inner + h_ccp/2 + delta*s/(2*pi))*cos(s)
    expry = (r_inner + h_ccp/2 + delta*s/(2*pi))*sin(s)
  pc4: ParCurve2D "mid cn"
    data = dset1
    parmin1 = theta_0
    parmax1 = theta_f
    exprx = (r_inner + delta/2 + delta*s/(2*pi))*cos(s)
    expry = (r_inner + delta/2 + delta*s/(2*pi))*sin(s)
  pc5: ParCurve2D "inner cn"
    data = dset1
    parmin1 = theta_0
    parmax1 = theta_f
    exprx = (r_inner + delta/2 - h_ccn/2 + delta*s/(2*pi))*cos(s)
    expry = (r_inner + delta/2 -h_ccn/2 + delta*s/(2*pi))*sin(s)
  pc6: ParCurve2D "outer cn"
    data = dset1
    parmin1 = theta_0
    parmax1 = theta_f
    exprx = (r_inner + delta/2 + h_ccn/2 + delta*s/(2*pi))*cos(s)
    expry = (r_inner + delta/2 + h_ccn/2 + delta*s/(2*pi))*sin(s)
  pc7: ParCurve2D "inner a1"
    data = dset1
    parmin1 = theta_0
    parmax1 = theta_f
    exprx = (r_inner + h_ccp/2 + delta*s/(2*pi))*cos(s)
    expry = (r_inner + h_ccp/2 + delta*s/(2*pi))*sin(s)
  pc8: ParCurve2D "mid a1"
    data = dset1
    parmin1 = theta_0
    parmax1 = theta_f
    exprx = (r_inner + h_ccp/2 + h_p/2 + delta*s/(2*pi))*cos(s)
    expry = (r_inner + h_ccp/2 + h_p/2 + delta*s/(2*pi))*sin(s)
  pc17: ParCurve2D "inner a2"
    data = dset1
    parmin1 = theta_0
    parmax1 = theta_f
    exprx = (r_inner + h_ccp/2 + h_p + delta*s/(2*pi))*cos(s)
    expry = (r_inner + h_ccp/2 + h_p + delta*s/(2*pi))*sin(s)
  pc18: ParCurve2D "mid a2"
    data = dset1
    parmin1 = theta_0
    parmax1 = theta_f
    exprx = (r_inner + h_ccp/2 + h_p + h_s/2 + delta*s/(2*pi))*cos(s)
    expry = (r_inner + h_ccp/2 + h_p + h_s/2 + delta*s/(2*pi))*sin(s)
  pc9: ParCurve2D "mid a3"
    data = dset1
    parmin1 = theta_0
    parmax1 = theta_f
    exprx = (r_inner + delta/2 - h_ccn/2 - h_n/2 + delta*s/(2*pi))*cos(s)
    expry = (r_inner + delta/2 - h_ccn/ 2 - h_n/2 + delta*s/(2*pi))*sin(s)
  pc10: ParCurve2D "outer a3"
    data = dset1
    parmin1 = theta_0
    parmax1 = theta_f
    exprx = (r_inner + delta/2 - h_ccn/2 + delta*s/(2*pi))*cos(s)
    expry = (r_inner + delta/2 - h_ccn/ 2 + delta*s/(2*pi))*sin(s)
  pc11: ParCurve2D "inner a4"
    data = dset1
    parmin1 = theta_0
    parmax1 = theta_f
    exprx = (r_inner + delta/2 + h_ccn/2 + delta*s/(2*pi))*cos(s)
    expry = (r_inner + delta/2 + h_ccn/ 2 + delta*s/(2*pi))*sin(s)
  pc12: ParCurve2D "mid a4"
    data = dset1
    parmin1 = theta_0
    parmax1 = theta_f
    exprx = (r_inner + delta/2 + h_ccn/2 + h_n/2 + delta*s/(2*pi))*cos(s)
    expry = (r_inner + delta/2 + h_ccn/ 2 + h_n/2 + delta*s/(2*pi))*sin(s)
  pc15: ParCurve2D "mid a5"
    data = dset1
    parmin1 = theta_0
    parmax1 = theta_f
    exprx = (r_inner + delta - h_ccp/2 - h_p - h_s/2 + delta*s/(2*pi))*cos(s)
    expry = (r_inner + delta - h_ccp/ 2 - h_p - h_s/2 + delta*s/(2*pi))*sin(s)
  pc16: ParCurve2D "outer a5"
    data = dset1
    parmin1 = theta_0
    parmax1 = theta_f
    exprx = (r_inner + delta - h_ccp/2 - h_p + delta*s/(2*pi))*cos(s)
    expry = (r_inner + delta - h_ccp/ 2 - h_p + delta*s/(2*pi))*sin(s)
  pc13: ParCurve2D "mid a6"
    data = dset1
    parmin1 = theta_0
    parmax1 = theta_f
    exprx = (r_inner + delta - h_ccp/2 - h_p/2 + delta*s/(2*pi))*cos(s)
    expry = (r_inner + delta - h_ccp/ 2 - h_p/2 + delta*s/(2*pi))*sin(s)
  pc14: ParCurve2D "outer a6"
    data = dset1
    parmin1 = theta_0
    parmax1 = theta_f
    exprx = (r_inner + delta - h_ccp/2 + delta*s/(2*pi))*cos(s)
    expry = (r_inner + delta - h_ccp/ 2 + delta*s/(2*pi))*sin(s)
  cln1: CutLine2D "theta0" | data = dset1; genpoints = {{X_ccp_inner(0), 0}, {X_ccp_outer(2*N*pi), 0}}
  cln2: CutLine2D "theta pi" | data = dset1; genpoints = {{X_ccp_inner(pi), 0}, {X_ccp_outer(2*N*pi+pi), 0}}

Plots
  pg1: PlotGroup2D "Radial stress" | data = dset1; title = Radial stress
    surf1: Surface | expr = solid.sl11; descr = Stress tensor, local coordinate system, 11 component
      def: Deform "Deformation" | expr = {0, 0}
  pg13: PlotGroup2D "Radial stress cc" on selection uni1 | data = dset1; title = Radial stress cc
    surf1: Surface | expr = solid.sl11; descr = Stress tensor, local coordinate system, 11 component
      def: Deform "Deformation" | expr = {0, 0}
  pg14: PlotGroup2D "Radial stress a" on selection uni2 | data = dset1; title = Radial stress a
    surf1: Surface | expr = solid.sl11; descr = Stress tensor, local coordinate system, 11 component
      def: Deform "Deformation" | expr = {0, 0}
  pg34: PlotGroup2D "Radial stress s" on selection uni3 | data = dset1; title = Radial stress s
    surf1: Surface | expr = solid.sl11; descr = Stress tensor, local coordinate system, 11 component
      def: Deform "Deformation" | expr = {0, 0}
  pg2: PlotGroup2D "Hoop stress" | data = dset1; title = Hoop stress
    surf1: Surface | expr = solid.sl22; descr = Stress tensor, local coordinate system, 22 component
      def: Deform "Deformation" | expr = {0, 0}
  pg15: PlotGroup2D "Hoop stress cc" on selection uni1 | data = dset1; title = Hoop stress cc
    surf1: Surface | expr = solid.sl22; descr = Stress tensor, local coordinate system, 22 component
      def: Deform "Deformation" | expr = {0, 0}
  pg16: PlotGroup2D "Hoop stress a" on selection uni2 | data = dset1; title = Hoop stress a
    surf1: Surface | expr = solid.sl22; descr = Stress tensor, local coordinate system, 22 component
      def: Deform "Deformation" | expr = {0, 0}
  pg35: PlotGroup2D "Hoop stress s" on selection uni3 | data = dset1; title = Hoop stress s
    surf1: Surface | expr = solid.sl22; descr = Stress tensor, local coordinate system, 22 component
      def: Deform "Deformation" | expr = {0, 0}
  pg12: PlotGroup2D "Shear stress" | data = dset1; title = Shear stress
    surf1: Surface | expr = solid.sl12; descr = Stress tensor, local coordinate system, 12 component
      def: Deform "Deformation" | expr = {0, 0}
  pg17: PlotGroup2D "Shear stress cc" on selection uni1 | data = dset1; title = Shear stress cc
    surf1: Surface | expr = solid.sl12; descr = Stress tensor, local coordinate system, 12 component
      def: Deform "Deformation" | expr = {0, 0}
  pg18: PlotGroup2D "Shear stress a" on selection uni2 | data = dset1; title = Shear stress a
    surf1: Surface | expr = solid.sl12; descr = Stress tensor, local coordinate system, 12 component
      def: Deform "Deformation" | expr = {0, 0}
  pg36: PlotGroup2D "Shear stress s" on selection uni3 | data = dset1; title = Shear stress s
    surf1: Surface | expr = solid.sl12; descr = Stress tensor, local coordinate system, 12 component
      def: Deform "Deformation" | expr = {0, 0}
  pg19: PlotGroup2D "Radial strain cc" on selection uni1 | data = dset1; title = Radial strain cc
    surf1: Surface | expr = solid.el11
      def: Deform "Deformation" | expr = {0, 0}
  pg21: PlotGroup2D "Radial strain a" on selection uni2 | data = dset1; title = Radial strain a
    surf1: Surface | expr = solid.el11
      def: Deform "Deformation" | expr = {0, 0}
  pg37: PlotGroup2D "Radial strain s" on selection uni3 | data = dset1; title = Radial strain s
    surf1: Surface | expr = solid.el11
      def: Deform "Deformation" | expr = {0, 0}
  pg20: PlotGroup2D "Azimuthal strain cc" on selection uni1 | data = dset1; title = Azimuthal strain cc
    surf1: Surface | expr = solid.el22; descr = Strain tensor, local coordinate system, 22 component
      def: Deform "Deformation" | expr = {0, 0}
  pg22: PlotGroup2D "Azimuthal strain a" on selection uni2 | data = dset1; title = Azimuthal strain a
    surf1: Surface | expr = solid.el22; descr = Strain tensor, local coordinate system, 22 component
      def: Deform "Deformation" | expr = {0, 0}
  pg38: PlotGroup2D "Azimuthal strain s" on selection uni3 | data = dset1; title = Azimuthal strain s
    surf1: Surface | expr = solid.el22; descr = Strain tensor, local coordinate system, 22 component
      def: Deform "Deformation" | expr = {0, 0}
  pg7: PlotGroup2D "Radial strain (elastic)" | data = dset1; title = Radial strain (elastic)
    surf2: Surface | expr = solid.eel11
      def: Deform "Deformation" | expr = {0, 0}
  pg6: PlotGroup2D "Radial strain (expansion)" | data = dset1; title = Radial strain (expansion)
    surf1: Surface | expr = solid.eth11; descr = Thermal strain tensor, local coordinate system, 11 component
      def: Deform "Deformation" | expr = {0, 0}
  pg8: PlotGroup2D "Radial strain (total)" | data = dset1; title = Radial strain (total)
    surf1: Surface | expr = solid.el11
      def: Deform "Deformation" | expr = {0, 0}
  pg9: PlotGroup2D "Azimuthal strain (elastic)" | data = dset1; title = Azimuthal strain (elastic)
    surf2: Surface | expr = solid.eel22
      def: Deform "Deformation" | expr = {0, 0}
  pg10: PlotGroup2D "Azimuthal strain (expansion)" | data = dset1; title = Azimuthal strain (expansion)
    surf1: Surface | expr = solid.eth22; descr = Thermal strain tensor, local coordinate system, 22 component
      def: Deform "Deformation" | expr = {0, 0}
  pg11: PlotGroup2D "Azimuthal strain (total)" | data = dset1; title = Azimuthal strain (total)
    surf1: Surface | expr = solid.el22; descr = Strain tensor, local coordinate system, 22 component
      def: Deform "Deformation" | expr = {0, 0}
  pg3: PlotGroup2D "Total displacement" on all domains | data = dset1; title = Total displacement
    surf1: Surface | expr = solid.disp; descr = Total displacement
      def: Deform "Deformation" | expr = {0, 0}
  pg4: PlotGroup2D "Radial displacement" | data = dset1; title = Radial displacement
    surf1: Surface | expr = u*cos(sys2.phi) + v*sin(sys2.phi)
      def: Deform "Deformation" | expr = {0, 0}
  pg5: PlotGroup2D "Azimuthal displacement" | data = dset1; title = Azimuthal displacement
    surf1: Surface | expr = v*cos(sys2.phi) - u*sin(sys2.phi)
      def: Deform "Deformation" | expr = {0, 0}
  pg39: PlotGroup2D "T cc pos" | data = dset1; title = Hoop stress cc
    surf1: Surface | expr = (solid.sl22 + solid.sl12*delta/pi/r_inner)*h_ccp
      def: Deform "Deformation" | expr = {0, 0}
  pg23: PlotGroup1D "Tp" | data = dset1; xlabel = r; ylabel = Tp
    lngr2: LineGraph "Tp inner"
      data = pc2
      expr = (solid.sl22 + solid.sl12*delta/pi/r_inner)*h_ccp
      xdata = expr
      xdataexpr = sys2.r
    lngr1: LineGraph "Tp mid"
      data = pc1
      expr = (solid.sl22 + solid.sl12*delta/pi/r_inner)*h_ccp
      xdata = expr
      xdataexpr = sys2.r
    lngr3: LineGraph "Tp outer"
      data = pc3
      expr = (solid.sl22 + solid.sl12*delta/pi/r_inner)*h_ccp
      xdata = expr
      xdataexpr = sys2.r
  pg24: PlotGroup1D "Tn" | data = dset1; xlabel = r; ylabel = Tn
    lngr2: LineGraph "Tn inner"
      data = pc5
      expr = (solid.sl22 + solid.sl12*delta/pi/r_inner)*h_ccn
      xdata = expr
      xdataexpr = sys2.r
    lngr1: LineGraph "Tn mid"
      data = pc4
      expr = (solid.sl22 + solid.sl12*delta/pi/r_inner)*h_ccn
      xdata = expr
      xdataexpr = sys2.r
    lngr3: LineGraph "Tn outer"
      data = pc6
      expr = (solid.sl22 + solid.sl12*delta/pi/r_inner)*h_ccn
      xdata = expr
      xdataexpr = sys2.r
  pg25: PlotGroup1D "Tp of s" | data = dset1; xlabel = s; ylabel = Tp
    lngr2: LineGraph "Tp inner" | data = pc2; expr = (solid.sl22 + solid.sl12*delta/pi/r_inner)*h_ccp; xdataexpr = sys2.r
    lngr1: LineGraph "Tp mid" | data = pc1; expr = (solid.sl22 + solid.sl12*delta/pi/r_inner)*h_ccp; xdataexpr = sys2.r
    lngr3: LineGraph "Tp outer" | data = pc3; expr = (solid.sl22 + solid.sl12*delta/pi/r_inner)*h_ccp; xdataexpr = sys2.r
  pg26: PlotGroup1D "Tn of s" | data = dset1; xlabel = s; ylabel = Tn
    lngr2: LineGraph "Tn inner" | data = pc5; expr = (solid.sl22 + solid.sl12*delta/pi/r_inner)*h_ccn; xdataexpr = sys2.r
    lngr1: LineGraph "Tn mid" | data = pc4; expr = (solid.sl22 + solid.sl12*delta/pi/r_inner)*h_ccn; xdataexpr = sys2.r
    lngr3: LineGraph "Tn outer" | data = pc6; expr = (solid.sl22 + solid.sl12*delta/pi/r_inner)*h_ccn; xdataexpr = sys2.r
  pg27: PlotGroup1D "s_rr" | data = dset1; xlabel = r; ylabel = s_rr
    lngr1: LineGraph "s_rr_1"
      data = pc8
      expr = solid.sl11
      descr = Stress tensor, local coordinate system, 11 component
      xdata = expr
      xdataexpr = sys2.r
    lngr2: LineGraph "s_rr_2"
      data = pc18
      expr = solid.sl11
      descr = Stress tensor, local coordinate system, 11 component
      xdata = expr
      xdataexpr = sys2.r
    lngr3: LineGraph "s_rr_3"
      data = pc9
      expr = solid.sl11
      descr = Stress tensor, local coordinate system, 11 component
      xdata = expr
      xdataexpr = sys2.r
    lngr4: LineGraph "s_rr_4"
      data = pc12
      expr = solid.sl11
      descr = Stress tensor, local coordinate system, 11 component
      xdata = expr
      xdataexpr = sys2.r
    lngr5: LineGraph "s_rr_5"
      data = pc15
      expr = solid.sl11
      descr = Stress tensor, local coordinate system, 11 component
      xdata = expr
      xdataexpr = sys2.r
    lngr6: LineGraph "s_rr_6"
      data = pc13
      expr = solid.sl11
      descr = Stress tensor, local coordinate system, 11 component
      xdata = expr
      xdataexpr = sys2.r
  pg28: PlotGroup1D "s_rt" | data = dset1; xlabel = r; ylabel = s_rt
    lngr1: LineGraph "s_rt_1"
      data = pc8
      expr = solid.sl12
      descr = Stress tensor, local coordinate system, 12 component
      xdata = expr
      xdataexpr = sys2.r
    lngr2: LineGraph "s_rt_2"
      data = pc18
      expr = solid.sl12
      descr = Stress tensor, local coordinate system, 12 component
      xdata = expr
      xdataexpr = sys2.r
      legends = 2
    lngr3: LineGraph "s_rt_3"
      data = pc9
      expr = solid.sl12
      descr = Stress tensor, local coordinate system, 12 component
      xdata = expr
      xdataexpr = sys2.r
      legends = 3
    lngr4: LineGraph "s_rt_4"
      data = pc12
      expr = solid.sl12
      descr = Stress tensor, local coordinate system, 12 component
      xdata = expr
      xdataexpr = sys2.r
    lngr5: LineGraph "s_rt_5"
      data = pc15
      expr = solid.sl12
      descr = Stress tensor, local coordinate system, 12 component
      xdata = expr
      xdataexpr = sys2.r
      legends = 3
    lngr6: LineGraph "s_rt_6"
      data = pc13
      expr = solid.sl12
      descr = Stress tensor, local coordinate system, 12 component
      xdata = expr
      xdataexpr = sys2.r
  pg29: PlotGroup1D "u" | data = dset1; xlabel = r; ylabel = u
    lngr1: LineGraph "u_1" | data = pc7; expr = u*cos(sys2.phi) + v*sin(sys2.phi); xdata = expr; xdataexpr = sys2.r
    lngr2: LineGraph "u_2" | data = pc17; expr = u*cos(sys2.phi) + v*sin(sys2.phi); xdata = expr; xdataexpr = sys2.r
    lngr3: LineGraph "u_3" | data = pc10; expr = u*cos(sys2.phi) + v*sin(sys2.phi); xdata = expr; xdataexpr = sys2.r
    lngr4: LineGraph "u_4" | data = pc11; expr = u*cos(sys2.phi) + v*sin(sys2.phi); xdata = expr; xdataexpr = sys2.r
    lngr5: LineGraph "u_5" | data = pc16; expr = u*cos(sys2.phi) + v*sin(sys2.phi); xdata = expr; xdataexpr = sys2.r
    lngr6: LineGraph "u_6" | data = pc14; expr = u*cos(sys2.phi) + v*sin(sys2.phi); xdata = expr; xdataexpr = sys2.r
  pg30: PlotGroup1D "v" | data = dset1; xlabel = r; ylabel = v
    lngr1: LineGraph "v_1" | data = pc7; expr = v*cos(sys2.phi) - u*sin(sys2.phi); xdata = expr; xdataexpr = sys2.r
    lngr2: LineGraph "v_2" | data = pc17; expr = v*cos(sys2.phi) - u*sin(sys2.phi); xdata = expr; xdataexpr = sys2.r
    lngr3: LineGraph "v_3" | data = pc10; expr = v*cos(sys2.phi) - u*sin(sys2.phi); xdata = expr; xdataexpr = sys2.r
    lngr4: LineGraph "v_4" | data = pc11; expr = v*cos(sys2.phi) - u*sin(sys2.phi); xdata = expr; xdataexpr = sys2.r
    lngr5: LineGraph "v_5" | data = pc16; expr = v*cos(sys2.phi) - u*sin(sys2.phi); xdata = expr; xdataexpr = sys2.r
    lngr6: LineGraph "v_6" | data = pc14; expr = v*cos(sys2.phi) - u*sin(sys2.phi); xdata = expr; xdataexpr = sys2.r
  pg31: PlotGroup1D "s_rr theta 0" | data = dset1; xlabel = r; ylabel = s_rr
    lngr1: LineGraph
      data = cln1
      expr = solid.sl11
      descr = Stress tensor, local coordinate system, 11 component
      xdata = expr
      xdataexpr = sys2.r
  pg32: PlotGroup1D "s_tt theta 0" | data = dset1; xlabel = r; ylabel = s_tt
    lngr1: LineGraph
      data = cln1
      expr = solid.sl22
      descr = Stress tensor, local coordinate system, 22 component
      xdata = expr
      xdataexpr = sys2.r
  pg33: PlotGroup1D "s_rt theta 0" | data = dset1; xlabel = r; ylabel = s_rt
    lngr1: LineGraph
      data = cln1
      expr = solid.sl12
      descr = Stress tensor, local coordinate system, 12 component
      xdata = expr
      xdataexpr = sys2.r
  pg40: PlotGroup1D "s_tt theta pi" | data = cln2
    lngr1: LineGraph | expr = solid.sl22; xdata = expr; xdataexpr = sys2.r

Exports
  plot1: Plot "Tp a" | filename = /home/timms/Documents/Papers/JellyMechanics/jelly_roll_mechanics/data/jelly/Tp_a.csv
  plot2: Plot "Tp b" | filename = /home/timms/Documents/Papers/JellyMechanics/jelly_roll_mechanics/data/jelly/Tp_b.csv
  plot3: Plot "Tp c" | filename = /home/timms/Documents/Papers/JellyMechanics/jelly_roll_mechanics/data/jelly/Tp_c.csv
  plot4: Plot "Tn a" | filename = /home/timms/Documents/Papers/JellyMechanics/jelly_roll_mechanics/data/jelly/Tn_a.csv
  plot5: Plot "Tn b" | filename = /home/timms/Documents/Papers/JellyMechanics/jelly_roll_mechanics/data/jelly/Tn_b.csv
  plot6: Plot "Tn c" | filename = /home/timms/Documents/Papers/JellyMechanics/jelly_roll_mechanics/data/jelly/Tn_c.csv
  plot7: Plot "srr_1" | filename = /home/timms/Documents/Papers/JellyMechanics/jelly_roll_mechanics/data/jelly/srr_1.csv
  plot8: Plot "srr_2" | filename = /home/timms/Documents/Papers/JellyMechanics/jelly_roll_mechanics/data/jelly/srr_2.csv
  plot9: Plot "srr_3" | filename = /home/timms/Documents/Papers/JellyMechanics/jelly_roll_mechanics/data/jelly/srr_3.csv
  plot10: Plot "srr_4" | filename = /home/timms/Documents/Papers/JellyMechanics/jelly_roll_mechanics/data/jelly/srr_4.csv
  plot23: Plot "srr_5" | filename = /home/timms/Documents/Papers/JellyMechanics/jelly_roll_mechanics/data/jelly/srr_5.csv
  plot24: Plot "srr_6" | filename = /home/timms/Documents/Papers/JellyMechanics/jelly_roll_mechanics/data/jelly/srr_6.csv
  plot11: Plot "srt_1" | filename = /home/timms/Documents/Papers/JellyMechanics/jelly_roll_mechanics/data/jelly/srt_1.csv
  plot12: Plot "srt_2" | filename = /home/timms/Documents/Papers/JellyMechanics/jelly_roll_mechanics/data/jelly/srt_2.csv
  plot13: Plot "srt_3" | filename = /home/timms/Documents/Papers/JellyMechanics/jelly_roll_mechanics/data/jelly/srt_3.csv
  plot14: Plot "srt_4" | filename = /home/timms/Documents/Papers/JellyMechanics/jelly_roll_mechanics/data/jelly/srt_4.csv
  plot25: Plot "srt_5" | filename = /home/timms/Documents/Papers/JellyMechanics/jelly_roll_mechanics/data/jelly/srt_5.csv
  plot26: Plot "srt_6" | filename = /home/timms/Documents/Papers/JellyMechanics/jelly_roll_mechanics/data/jelly/srt_6.csv
  plot15: Plot "u_1" | filename = /home/timms/Documents/Papers/JellyMechanics/jelly_roll_mechanics/data/jelly/u_1.csv
  plot16: Plot "u_2" | filename = /home/timms/Documents/Papers/JellyMechanics/jelly_roll_mechanics/data/jelly/u_2.csv
  plot17: Plot "u_3" | filename = /home/timms/Documents/Papers/JellyMechanics/jelly_roll_mechanics/data/jelly/u_3.csv
  plot18: Plot "u_4" | filename = /home/timms/Documents/Papers/JellyMechanics/jelly_roll_mechanics/data/jelly/u_4.csv
  plot27: Plot "u_5" | filename = /home/timms/Documents/Papers/JellyMechanics/jelly_roll_mechanics/data/jelly/u_5.csv
  plot28: Plot "u_6" | filename = /home/timms/Documents/Papers/JellyMechanics/jelly_roll_mechanics/data/jelly/u_6.csv
  plot19: Plot "v_1" | filename = /home/timms/Documents/Papers/JellyMechanics/jelly_roll_mechanics/data/jelly/v_1.csv
  plot20: Plot "v_2" | filename = /home/timms/Documents/Papers/JellyMechanics/jelly_roll_mechanics/data/jelly/v_2.csv
  plot21: Plot "v_3" | filename = /home/timms/Documents/Papers/JellyMechanics/jelly_roll_mechanics/data/jelly/v_3.csv
  plot22: Plot "v_4" | filename = /home/timms/Documents/Papers/JellyMechanics/jelly_roll_mechanics/data/jelly/v_4.csv
  plot29: Plot "v_5" | filename = /home/timms/Documents/Papers/JellyMechanics/jelly_roll_mechanics/data/jelly/v_5.csv
  plot30: Plot "v_6" | filename = /home/timms/Documents/Papers/JellyMechanics/jelly_roll_mechanics/data/jelly/v_6.csv