// COMSOL Multiphysics 5.6.0.280 model "jelly_mech_layers.mph"
// Outline of the model tree
// Unit system: none

Parameters
  N = 10
  r_inner = 0.1
  r_outer = 1
  delta = (r_outer-r_inner)/N  // a+cc thickness
  theta_0 = 0
  theta_f = N*2*pi
  hh = 0.05*delta  // cc thickness
  E_n = 1
  E_ccn = 1e4
  alpha_n = -0.1
  nu_n = 1/3
  nu_ccn = 1/3
  h_n = l_n*delta - h_ccn/2
  h_p = l_p*delta - h_ccp/2
  E_p = 10
  E_ccp = 1e4
  nu_p = 1/3
  nu_ccp = 1/3
  h_ccn = hh
  h_ccp = hh
  h_total = h_ccn+2*h_n+2*h_p+h_ccp  // should equal delta
  alpha_p = 0.02
  l_n = 0.5/2
  l_p = 0.5/2

Functions
  an5: Analytic "X_ccp_inner" | funcname = X_ccp_inner; expr = (r_inner - h_ccp/2 + delta*s/(2*pi))*cos(s); args = s
  an6: Analytic "Y_ccp_inner" | funcname = Y_ccp_inner; expr = (r_inner - h_ccp/2 + delta*s/(2*pi))*sin(s); args = s
  an9: Analytic "X_ccp_outer" | funcname = X_ccp_outer; expr = (r_inner + h_ccp/2 + delta*s/(2*pi))*cos(s); args = s
  an10: Analytic "Y_ccp_outer" | funcname = Y_ccp_outer; expr = (r_inner + h_ccp/2 + delta*s/(2*pi))*sin(s); args = s
  an17: Analytic "X_sep_pn" | funcname = X_sep_pn; expr = (r_inner + h_ccp/2 + h_p + delta*s/(2*pi))*cos(s); args = s
  an18: Analytic "Y_sep_pn" | funcname = Y_sep_pn; expr = (r_inner + h_ccp/2 + h_p + delta*s/(2*pi))*sin(s); args = s
  an11: Analytic "X_ccn_inner" | funcname = X_ccn_inner; expr = (r_inner + delta/2 - h_ccn/2 + delta*s/(2*pi))*cos(s); args = s
  an12: Analytic "Y_ccn_inner" | funcname = Y_ccn_inner; expr = (r_inner + delta/2 - h_ccn/2 + delta*s/(2*pi))*sin(s); args = s
  an13: Analytic "X_ccn_outer" | funcname = X_ccn_outer; expr = (r_inner + delta/2 + h_ccn/2 + delta*s/(2*pi))*cos(s); args = s
  an14: Analytic "Y_ccn_outer" | funcname = Y_ccn_outer; expr = (r_inner + delta/2 + h_ccn/2 + delta*s/(2*pi))*sin(s); args = s
  an15: Analytic "X_sep_np" | funcname = X_sep_np; expr = (r_inner + delta - h_ccp/2 - h_p + delta*s/(2*pi))*cos(s); args = s
  an16: Analytic "Y_sep_np" | funcname = Y_sep_np; expr = (r_inner + delta - h_ccp/2 - h_p + delta*s/(2*pi))*sin(s); args = s

Selections
  sel3: Explicit "ccp" on domains 1, 2, 13, 14, 25, 26, 37, 38, 49, 50, 61, 62, 73, 74, 85, 86, 97, 98, 109-111, 117, 123, 129, 135, 141, 147, 153, 159, 165, 166, 172, 178, 184, 190, 196, 202, 208, 214, 220
  sel4: Explicit "p" on domains 3, 4, 11, 12, 15, 16, 23, 24, 27, 28, 35, 36, 39, 40, 47, 48, 51, 52, 59, 60, 63, 64, 71, 72, 75, 76, 83, 84, 87, 88, 95, 96, 99, 100, 107, 108, 112, 116, 118, 122, 124, 128, 130, 134, 136, 140, 142, 146, 148, 152, 154, 158, 160, 164, 167, 171, 173, 177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
  sel2: Explicit "n" on domains 5, 6, 9, 10, 17, 18, 21, 22, 29, 30, 33, 34, 41, 42, 45, 46, 53, 54, 57, 58, 65, 66, 69, 70, 77, 78, 81, 82, 89, 90, 93, 94, 101, 102, 105, 106, 113, 115, 119, 121, 125, 127, 131, 133, 137, 139, 143, 145, 149, 151, 155, 157, 161, 163, 168, 170, 174, 176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
  sel1: Explicit "ccn" on domains 7, 8, 19, 20, 31, 32, 43, 44, 55, 56, 67, 68, 79, 80, 91, 92, 103, 104, 114, 120, 126, 132, 138, 144, 150, 156, 162, 169, 175, 181, 187, 193, 199, 205, 211, 217
  uni1: Union "cc" | entitydim = 2; input = {sel3, sel1}
  uni2: Union "a" | entitydim = 2; input = {sel2, sel4}

Coordinate systems
  sys2: Cylindrical "Cylindrical System 2"

Geometry
  geom1 "Geometry 1" (2D, length unit m)
    pc5: ParametricCurve "ccp inner" | parmin = theta_0; parmax = theta_f; coord = {X_ccp_inner(s), Y_ccp_inner(s)}
    pc6: ParametricCurve "ccp outer" | parmin = theta_0; parmax = theta_f; coord = {X_ccp_outer(s), Y_ccp_outer(s)}
    pc8: ParametricCurve "sep pn" | parmin = theta_0; parmax = theta_f-2*pi; coord = {X_sep_pn(s), Y_sep_pn(s)}
    pc3: ParametricCurve "ccn inner" | parmin = theta_0; parmax = theta_f-2*pi; coord = {X_ccn_inner(s), Y_ccn_inner(s)}
    pc4: ParametricCurve "ccn outer" | parmin = theta_0; parmax = theta_f-2*pi; coord = {X_ccn_outer(s), Y_ccn_outer(s)}
    pc7: ParametricCurve "sep np" | parmin = theta_0; parmax = theta_f-2*pi; coord = {X_sep_np(s), Y_sep_np(s)}
    ls1: LineSegment "inner1"
      specify1 = coord
      coord1 = {X_ccp_inner(0), 0}
      specify2 = coord
      coord2 = {X_ccp_inner(2*pi), 0}
    ls2: LineSegment "outer1"
      specify1 = coord
      vertex1 = pc3(1) points 1
      coord1 = {X_ccp_outer(theta_f-2*pi), 0}
      specify2 = coord
      coord2 = {X_ccp_outer(theta_f), 0}
    csol1: ConvertToSolid | input = ls1, ls2, pc3, pc4, pc5, pc6, pc7, pc8; keep = on
    del1: Delete "Delete Entities 1" | input = csol1(1) domains 2
    pol1: Polygon | source = table; table = {{0, r_outer*1.1}, {0, -r_outer*1.1}}
    pol2: Polygon | source = table; table = {{r_outer*1.1, 0}, {-r_outer*1.1, 0}}
    uni1: Union | input = del1, pol1, pol2
    del2: Delete "Delete Entities 2" | input = uni1(1) boundaries 1, 57, 58, 114-116, 172, 234
    fin: Finalize "Form Union"

Materials
  mat7: Common "ccp" on selection sel3
    def "Basic"
      youngsmodulus = E_ccp
      poissonsratio = nu_ccp
      density = 1
      thermalexpansioncoefficient = 0
  mat8: Common "p" on selection sel4
    def "Basic"
      youngsmodulus = E_p
      poissonsratio = nu_p
      density = 1
      thermalexpansioncoefficient = alpha_p
  mat6: Common "n" on selection sel2
    def "Basic"
      youngsmodulus = E_n
      poissonsratio = nu_n
      density = 1
      thermalexpansioncoefficient = alpha_n
  mat5: Common "ccn" on selection sel1
    def "Basic"
      youngsmodulus = E_ccn
      poissonsratio = nu_ccn
      density = 1
      thermalexpansioncoefficient = 0

Physics
  solid: SolidMechanics on all domains
    dependent variable u = {u, v, w}
    ShapeProperty.order_displacement = 2
    StructuralTransientBehavior.StructuralTransientBehavior = Quasistatic
    lemm1: LinearElasticModel "Linear Elastic Material 1" (default)
      IsotropicOption = Enu
      ForceLinearStrainRes = 1
      coordinateSystem = sys2
      te1: ThermalExpansion on all domains | minput_strainreferencetemperature = 0; minput_temperature = 1
    free1: Free (default)
    init1: init "Initial Values 1" (default) | coordinateSystem = sys2
    rms1: RigidMotionSuppression (disabled) on all domains
    fix1: Fixed "Fixed Constraint 1" on boundaries 221-228, 339, 450

Mesh
  mesh1 "Mesh 1"
    size: MeshSizeDefault | hmax = 0.005; hauto = 1; custom = on; hnarrow = 1
    map1: Map "Mapped 1" on remaining entities

Studies
  std1 "Study 1"
    stat: Stationary | errestandadap = none; meshadaptmethod = modify

Solver configurations
  sol1 "Solution 1" (study std1)
    v1: Variables "Dependent Variables 1"
    s1: Stationary "Stationary Solver 1"
      dDef: Direct | linsolver = pardiso
      fc1: FullyCoupled | linsolver = dDef
  sol2 "Adaptive Mesh Refinement Solutions 1" (study std1)

Datasets
  dset1: Solution | solution = sol1
  dset2: Solution | solution = sol2
  pc1: ParCurve2D "mid cp"
    data = dset1
    parmin1 = theta_0
    parmax1 = theta_f
    exprx = (r_inner + delta*s/(2*pi))*cos(s)
    expry = (r_inner + delta*s/(2*pi))*sin(s)
    adaptive = off
  pc2: ParCurve2D "inner cp"
    data = dset1
    parmin1 = theta_0
    parmax1 = theta_f
    exprx = (r_inner - h_ccp/2 + delta*s/(2*pi))*cos(s)
    expry = (r_inner - h_ccp/2 + delta*s/(2*pi))*sin(s)
    bndsnap = on
    adaptive = off
  pc3: ParCurve2D "outer cp"
    data = dset1
    parmin1 = theta_0
    parmax1 = theta_f
    exprx = (r_inner + h_ccp/2 + delta*s/(2*pi))*cos(s)
    expry = (r_inner + h_ccp/2 + delta*s/(2*pi))*sin(s)
    bndsnap = on
    adaptive = off
  pc4: ParCurve2D "mid cn"
    data = dset1
    parmin1 = theta_0
    parmax1 = theta_f
    exprx = (r_inner + delta/2 + delta*s/(2*pi))*cos(s)
    expry = (r_inner + delta/2 + delta*s/(2*pi))*sin(s)
    adaptive = off
  pc5: ParCurve2D "inner cn"
    data = dset1
    parmin1 = theta_0
    parmax1 = theta_f
    exprx = (r_inner + delta/2 - h_ccn/2 + delta*s/(2*pi))*cos(s)
    expry = (r_inner + delta/2 -h_ccn/2 + delta*s/(2*pi))*sin(s)
    bndsnap = on
    adaptive = off
  pc6: ParCurve2D "outer cn"
    data = dset1
    parmin1 = theta_0
    parmax1 = theta_f
    exprx = (r_inner + delta/2 + h_ccn/2 + delta*s/(2*pi))*cos(s)
    expry = (r_inner + delta/2 + h_ccn/2 + delta*s/(2*pi))*sin(s)
    bndsnap = on
    adaptive = off
  pc7: ParCurve2D "inner a1"
    data = dset1
    parmin1 = theta_0
    parmax1 = theta_f
    exprx = (r_inner + h_ccp/2 + delta*s/(2*pi))*cos(s)
    expry = (r_inner + h_ccp/2 + delta*s/(2*pi))*sin(s)
    bndsnap = on
    adaptive = off
  pc8: ParCurve2D "mid a1"
    data = dset1
    parmin1 = theta_0
    parmax1 = theta_f
    exprx = (r_inner + h_ccp/2 + h_p/2 + delta*s/(2*pi))*cos(s)
    expry = (r_inner + h_ccp/2 + h_p/2 + delta*s/(2*pi))*sin(s)
    adaptive = off
  pc9: ParCurve2D "mid a2"
    data = dset1
    parmin1 = theta_0
    parmax1 = theta_f
    exprx = (r_inner + delta/2 - h_ccn/2 - h_n/2 + delta*s/(2*pi))*cos(s)
    expry = (r_inner + delta/2 - h_ccn/ 2 - h_n/2 + delta*s/(2*pi))*sin(s)
    adaptive = off
  pc10: ParCurve2D "outer a2"
    data = dset1
    parmin1 = theta_0
    parmax1 = theta_f
    exprx = (r_inner + delta/2 - h_ccn/2 + delta*s/(2*pi))*cos(s)
    expry = (r_inner + delta/2 - h_ccn/ 2 + delta*s/(2*pi))*sin(s)
    bndsnap = on
    adaptive = off
  pc11: ParCurve2D "inner a3"
    data = dset1
    parmin1 = theta_0
    parmax1 = theta_f
    exprx = (r_inner + delta/2 + h_ccn/2 + delta*s/(2*pi))*cos(s)
    expry = (r_inner + delta/2 + h_ccn/ 2 + delta*s/(2*pi))*sin(s)
    bndsnap = on
    adaptive = off
  pc12: ParCurve2D "mid a3"
    data = dset1
    parmin1 = theta_0
    parmax1 = theta_f
    exprx = (r_inner + delta/2 + h_ccn/2 + h_n/2 + delta*s/(2*pi))*cos(s)
    expry = (r_inner + delta/2 + h_ccn/ 2 + h_n/2 + delta*s/(2*pi))*sin(s)
    adaptive = off
  pc13: ParCurve2D "mid a4"
    data = dset1
    parmin1 = theta_0
    parmax1 = theta_f
    exprx = (r_inner + delta - h_ccp/2 - h_p/2 + delta*s/(2*pi))*cos(s)
    expry = (r_inner + delta - h_ccp/ 2 - h_p/2 + delta*s/(2*pi))*sin(s)
    adaptive = off
  pc14: ParCurve2D "outer a4"
    data = dset1
    parmin1 = theta_0
    parmax1 = theta_f
    exprx = (r_inner + delta - h_ccp/2 + delta*s/(2*pi))*cos(s)
    expry = (r_inner + delta - h_ccp/ 2 + delta*s/(2*pi))*sin(s)
    bndsnap = on
    adaptive = off
  cln1: CutLine2D "theta0" | data = dset1; genpoints = {{X_ccp_inner(0), 0}, {X_ccp_outer(2*N*pi), 0}}

Plots
  pg1: PlotGroup2D "Radial stress" | data = dset1; title = Radial stress
    surf1: Surface | expr = solid.sl11; descr = Stress tensor, local coordinate system, 11 component
      def: Deform "Deformation" | expr = {0, 0}
  pg13: PlotGroup2D "Radial stress cc" on selection uni1 | data = dset1; title = Radial stress cc
    surf1: Surface | expr = solid.sl11; descr = Stress tensor, local coordinate system, 11 component
      def: Deform "Deformation" | expr = {0, 0}
  pg14: PlotGroup2D "Radial stress a" on selection uni2 | data = dset1; title = Radial stress a
    surf1: Surface | expr = solid.sl11; descr = Stress tensor, local coordinate system, 11 component
      def: Deform "Deformation" | expr = {0, 0}
  pg2: PlotGroup2D "Hoop stress" | data = dset1; title = Hoop stress
    surf1: Surface | expr = solid.sl22; descr = Stress tensor, local coordinate system, 22 component
      def: Deform "Deformation" | expr = {0, 0}
  pg15: PlotGroup2D "Hoop stress cc" on selection uni1 | data = dset1; title = Hoop stress cc
    surf1: Surface | expr = solid.sl22; descr = Stress tensor, local coordinate system, 22 component
      def: Deform "Deformation" | expr = {0, 0}
  pg16: PlotGroup2D "Hoop stress a" on selection uni2 | data = dset1; title = Hoop stress a
    surf1: Surface | expr = solid.sl22; descr = Stress tensor, local coordinate system, 22 component
      def: Deform "Deformation" | expr = {0, 0}
  pg12: PlotGroup2D "Shear stress" | data = dset1; title = Shear stress
    surf1: Surface | expr = solid.sl12; descr = Stress tensor, local coordinate system, 12 component
      def: Deform "Deformation" | expr = {0, 0}
  pg17: PlotGroup2D "Shear stress cc" on selection uni1 | data = dset1; title = Shear stress cc
    surf1: Surface | expr = solid.sl12; descr = Stress tensor, local coordinate system, 12 component
      def: Deform "Deformation" | expr = {0, 0}
  pg18: PlotGroup2D "Shear stress a" on selection uni2 | data = dset1; title = Shear stress cc
    surf1: Surface | expr = solid.sl12; descr = Stress tensor, local coordinate system, 12 component
      def: Deform "Deformation" | expr = {0, 0}
  pg19: PlotGroup2D "Radial strain cc" on selection uni1 | data = dset1; title = Radial strain cc
    surf1: Surface | expr = solid.el11
      def: Deform "Deformation" | expr = {0, 0}
  pg21: PlotGroup2D "Radial strain a" on selection uni2 | data = dset1; title = Radial strain a
    surf1: Surface | expr = solid.el11
      def: Deform "Deformation" | expr = {0, 0}
  pg20: PlotGroup2D "Azimuthal strain cc" on selection uni1 | data = dset1; title = Azimuthal strain cc
    surf1: Surface | expr = solid.el22; descr = Strain tensor, local coordinate system, 22 component
      def: Deform "Deformation" | expr = {0, 0}
  pg22: PlotGroup2D "Azimuthal strain a" on selection uni2 | data = dset1; title = Azimuthal strain a
    surf1: Surface | expr = solid.el22; descr = Strain tensor, local coordinate system, 22 component
      def: Deform "Deformation" | expr = {0, 0}
  pg7: PlotGroup2D "Radial strain (elastic)" | data = dset1; title = Radial strain (elastic)
    surf2: Surface | expr = solid.eel11
      def: Deform "Deformation" | expr = {0, 0}
  pg6: PlotGroup2D "Radial strain (expansion)" | data = dset1; title = Radial strain (expansion)
    surf1: Surface | expr = solid.eth11; descr = Thermal strain tensor, local coordinate system, 11 component
      def: Deform "Deformation" | expr = {0, 0}
  pg8: PlotGroup2D "Radial strain (total)" | data = dset1; title = Radial strain (total)
    surf1: Surface | expr = solid.el11
      def: Deform "Deformation" | expr = {0, 0}
  pg9: PlotGroup2D "Azimuthal strain (elastic)" | data = dset1; title = Azimuthal strain (elastic)
    surf2: Surface | expr = solid.eel22
      def: Deform "Deformation" | expr = {0, 0}
  pg10: PlotGroup2D "Azimuthal strain (expansion)" | data = dset1; title = Azimuthal strain (expansion)
    surf1: Surface | expr = solid.eth22; descr = Thermal strain tensor, local coordinate system, 22 component
      def: Deform "Deformation" | expr = {0, 0}
  pg11: PlotGroup2D "Azimuthal strain (total)" | data = dset1; title = Azimuthal strain (total)
    surf1: Surface | expr = solid.el22; descr = Strain tensor, local coordinate system, 22 component
      def: Deform "Deformation" | expr = {0, 0}
  pg3: PlotGroup2D "Total displacement" on all domains | data = dset1; title = Total displacement
    surf1: Surface | expr = solid.disp; descr = Total displacement
      def: Deform "Deformation" | expr = {u, v}; descr = Displacement field
  pg4: PlotGroup2D "Radial displacement" | data = dset1; title = Radial displacement
    surf1: Surface | expr = u*cos(sys2.phi) + v*sin(sys2.phi)
      def: Deform "Deformation" | expr = {0, 0}
  pg5: PlotGroup2D "Azimuthal displacement" | data = dset1; title = Azimuthal displacement
    surf1: Surface | expr = v*cos(sys2.phi) - u*sin(sys2.phi)
      def: Deform "Deformation" | expr = {0, 0}
  pg23: PlotGroup1D "Tp" | data = dset1; xlabel = r; ylabel = Tp
    lngr2: LineGraph "Tp inner"
      data = pc2
      expr = (solid.sl22 + solid.sl12*delta/pi/r_inner)*h_ccp
      xdata = expr
      xdataexpr = sys2.r
    lngr1: LineGraph "Tp mid"
      data = pc1
      expr = (solid.sl22 + solid.sl12*delta/pi/r_inner)*h_ccp
      xdata = expr
      xdataexpr = sys2.r
    lngr3: LineGraph "Tp outer"
      data = pc3
      expr = (solid.sl22 + solid.sl12*delta/pi/r_inner)*h_ccp
      xdata = expr
      xdataexpr = sys2.r
  pg24: PlotGroup1D "Tn" | data = dset1; xlabel = r; ylabel = Tn
    lngr2: LineGraph "Tn inner"
      data = pc5
      expr = (solid.sl22 + solid.sl12*delta/pi/r_inner)*h_ccn
      xdata = expr
      xdataexpr = sys2.r
    lngr1: LineGraph "Tn mid"
      data = pc4
      expr = (solid.sl22 + solid.sl12*delta/pi/r_inner)*h_ccn
      xdata = expr
      xdataexpr = sys2.r
    lngr3: LineGraph "Tn outer"
      data = pc6
      expr = (solid.sl22 + solid.sl12*delta/pi/r_inner)*h_ccn
      xdata = expr
      xdataexpr = sys2.r
  pg25: PlotGroup1D "Tp of s" | data = dset1; xlabel = s; ylabel = Tp
    lngr2: LineGraph "Tp inner" | data = pc2; expr = (solid.sl22 + solid.sl12*delta/pi/r_inner)*h_ccp; xdataexpr = sys2.r
    lngr1: LineGraph "Tp mid" | data = pc1; expr = (solid.sl22 + solid.sl12*delta/pi/r_inner)*h_ccp; xdataexpr = sys2.r
    lngr3: LineGraph "Tp outer" | data = pc3; expr = (solid.sl22 + solid.sl12*delta/pi/r_inner)*h_ccp; xdataexpr = sys2.r
  pg26: PlotGroup1D "Tn of s" | data = dset1; xlabel = s; ylabel = Tn
    lngr2: LineGraph "Tn inner" | data = pc5; expr = (solid.sl22 + solid.sl12*delta/pi/r_inner)*h_ccn; xdataexpr = sys2.r
    lngr1: LineGraph "Tn mid" | data = pc4; expr = (solid.sl22 + solid.sl12*delta/pi/r_inner)*h_ccn; xdataexpr = sys2.r
    lngr3: LineGraph "Tn outer" | data = pc6; expr = (solid.sl22 + solid.sl12*delta/pi/r_inner)*h_ccn; xdataexpr = sys2.r
  pg27: PlotGroup1D "s_rr" | data = dset1; xlabel = r; ylabel = s_rr
    lngr1: LineGraph "s_rr_1"
      data = pc8
      expr = solid.sl11
      descr = Stress tensor, local coordinate system, 11 component
      xdata = expr
      xdataexpr = sys2.r
    lngr2: LineGraph "s_rr_2"
      data = pc9
      expr = solid.sl11
      descr = Stress tensor, local coordinate system, 11 component
      xdata = expr
      xdataexpr = sys2.r
    lngr3: LineGraph "s_rr_3"
      data = pc12
      expr = solid.sl11
      descr = Stress tensor, local coordinate system, 11 component
      xdata = expr
      xdataexpr = sys2.r
    lngr4: LineGraph "s_rr_4"
      data = pc13
      expr = solid.sl11
      descr = Stress tensor, local coordinate system, 11 component
      xdata = expr
      xdataexpr = sys2.r
  pg28: PlotGroup1D "s_rt" | data = dset1; xlabel = r; ylabel = s_rt
    lngr1: LineGraph "s_rt_1"
      data = pc8
      expr = solid.sl12
      descr = Stress tensor, local coordinate system, 12 component
      xdata = expr
      xdataexpr = sys2.r
    lngr2: LineGraph "s_rt_2"
      data = pc9
      expr = solid.sl12
      descr = Stress tensor, local coordinate system, 12 component
      xdata = expr
      xdataexpr = sys2.r
      legends = 2
    lngr3: LineGraph "s_rt_3"
      data = pc12
      expr = solid.sl12
      descr = Stress tensor, local coordinate system, 12 component
      xdata = expr
      xdataexpr = sys2.r
      legends = 3
    lngr4: LineGraph "s_rt_4"
      data = pc13
      expr = solid.sl12
      descr = Stress tensor, local coordinate system, 12 component
      xdata = expr
      xdataexpr = sys2.r
  pg29: PlotGroup1D "u" | data = dset1; xlabel = r; ylabel = u
    lngr1: LineGraph "u_1" | data = pc7; expr = u*cos(sys2.phi) + v*sin(sys2.phi); xdata = expr; xdataexpr = sys2.r
    lngr2: LineGraph "u_2" | data = pc10; expr = u*cos(sys2.phi) + v*sin(sys2.phi); xdata = expr; xdataexpr = sys2.r
    lngr3: LineGraph "u_3" | data = pc11; expr = u*cos(sys2.phi) + v*sin(sys2.phi); xdata = expr; xdataexpr = sys2.r
    lngr4: LineGraph "u_4" | data = pc14; expr = u*cos(sys2.phi) + v*sin(sys2.phi); xdata = expr; xdataexpr = sys2.r
  pg30: PlotGroup1D "v" | data = dset1; xlabel = r; ylabel = v
    lngr1: LineGraph "v_1" | data = pc7; expr = v*cos(sys2.phi) - u*sin(sys2.phi); xdata = expr; xdataexpr = sys2.r
    lngr2: LineGraph "v_2" | data = pc10; expr = v*cos(sys2.phi) - u*sin(sys2.phi); xdata = expr; xdataexpr = sys2.r
    lngr3: LineGraph "v_3" | data = pc11; expr = v*cos(sys2.phi) - u*sin(sys2.phi); xdata = expr; xdataexpr = sys2.r
    lngr4: LineGraph "v_4" | data = pc14; expr = v*cos(sys2.phi) - u*sin(sys2.phi); xdata = expr; xdataexpr = sys2.r
  pg31: PlotGroup1D "s_rr theta 0" | data = dset1; xlabel = r; ylabel = s_rr
    lngr1: LineGraph
      data = cln1
      expr = solid.sl11
      descr = Stress tensor, local coordinate system, 11 component
      xdata = expr
      xdataexpr = sys2.r
  pg32: PlotGroup1D "s_tt theta 0" | data = dset1; xlabel = r; ylabel = s_tt
    lngr1: LineGraph
      data = cln1
      expr = solid.sl22
      descr = Stress tensor, local coordinate system, 22 component
      xdata = expr
      xdataexpr = sys2.r
  pg33: PlotGroup1D "s_rt theta 0" | data = dset1; xlabel = r; ylabel = s_rt
    lngr1: LineGraph
      data = cln1
      expr = solid.sl12
      descr = Stress tensor, local coordinate system, 12 component
      xdata = expr
      xdataexpr = sys2.r

Exports
  plot1: Plot "Tp a" | filename = /home/timms/Documents/jelly_roll_mechanics/data/double/Tp_a.csv
  plot2: Plot "Tp b" | filename = /home/timms/Documents/jelly_roll_mechanics/data/double/Tp_b.csv
  plot3: Plot "Tp c" | filename = /home/timms/Documents/jelly_roll_mechanics/data/double/Tp_c.csv
  plot4: Plot "Tn a" | filename = /home/timms/Documents/jelly_roll_mechanics/data/double/Tn_a.csv
  plot5: Plot "Tn b" | filename = /home/timms/Documents/jelly_roll_mechanics/data/double/Tn_b.csv
  plot6: Plot "Tn c" | filename = /home/timms/Documents/jelly_roll_mechanics/data/double/Tn_c.csv
  plot7: Plot "srr_1" | filename = /home/timms/Documents/jelly_roll_mechanics/data/double/srr_1.csv
  plot8: Plot "srr_2" | filename = /home/timms/Documents/jelly_roll_mechanics/data/double/srr_2.csv
  plot9: Plot "srr_3" | filename = /home/timms/Documents/jelly_roll_mechanics/data/double/srr_3.csv
  plot10: Plot "srr_4" | filename = /home/timms/Documents/jelly_roll_mechanics/data/double/srr_4.csv
  plot11: Plot "srt_1" | filename = /home/timms/Documents/jelly_roll_mechanics/data/double/srt_1.csv
  plot12: Plot "srt_2" | filename = /home/timms/Documents/jelly_roll_mechanics/data/double/srt_2.csv
  plot13: Plot "srt_3" | filename = /home/timms/Documents/jelly_roll_mechanics/data/double/srt_3.csv
  plot14: Plot "srt_4" | filename = /home/timms/Documents/jelly_roll_mechanics/data/double/srt_4.csv
  plot15: Plot "u_1" | filename = /home/timms/Documents/jelly_roll_mechanics/data/double/u_1.csv
  plot16: Plot "u_2" | filename = /home/timms/Documents/jelly_roll_mechanics/data/double/u_2.csv
  plot17: Plot "u_3" | filename = /home/timms/Documents/jelly_roll_mechanics/data/double/u_3.csv
  plot18: Plot "u_4" | filename = /home/timms/Documents/jelly_roll_mechanics/data/double/u_4.csv
  plot19: Plot "v_1" | filename = /home/timms/Documents/jelly_roll_mechanics/data/double/v_1.csv
  plot20: Plot "v_2" | filename = /home/timms/Documents/jelly_roll_mechanics/data/double/v_2.csv
  plot21: Plot "v_3" | filename = /home/timms/Documents/jelly_roll_mechanics/data/double/v_3.csv
  plot22: Plot "v_4" | filename = /home/timms/Documents/jelly_roll_mechanics/data/double/v_4.csv